// COMSOL Multiphysics 5.6.0.401 model "Prob2_PFR.mph"
// Outline of the model tree

Parameters
  E = 75362[J/mol]  // Activation energy
  A = 16.96e12[1/h]  // Frequency factor
  Uk = 1300[W/m^2/K]  // Overall heat-transfer coefficient
  ke = 0.559[W/m/K]  // Thermal conductivity mixture
  T0 = 312[K]  // Inlet temperature
  Ta0 = 273[K]  // Inlet temperature of the coolant
  dHrx = -84666[J/mol]  // Heat of reaction
  v0 = 0.1[mol/s]/cA0  // Total flow rate
  u0 = v0/(pi*Ra^2)  // Average flow velocity
  cA0 = rho_A/M_A/9[1]  // Propylene oxide concentration, inlet
  cB0 = rho_B/M_B*(7/9)[1]  // Water concentration, inlet
  Ra = 0.1[m]  // Reactor radius
  L = 1[m]  // Reactor length
  M_A = 58.095[g/mol]  // Molar weight, propylene oxide
  M_B = 18[g/mol]  // Molar weight, water
  M_C = 76.095[g/mol]  // Molar weight, propylene glycol
  rho_A = 830[kg/m^3]  // Density, propylene oxide
  rho_B = 1000[kg/m^3]  // Density, water
  rho_C = 1040[kg/m^3]  // Density, propylene glycol
  myref_B = 1e-3[Pa*s]  // Reference dynamic viscosity, water
  Tref_my = 293[K]  // Reference temperature viscosity
  cpm_B = 75.36[J/mol/K]  // Molar heat capacity, water

Variables
  var1 "Variables 1"
    xA = (cA0-cA)/cA0  // Conversion species A

Geometry
  geom1 "Geometry 1" (2D axisymmetric, length unit m)
    r1: Rectangle | size = {0.1, 1}
    fin: Finalize "Form Union"

Physics
  chem: Chemistry on all domains
    TPFeatureInput.T_src = root.comp1.T
    mixture.mixture = liquid
    ChemistryModelInputParameter.ConcentrationInput = {cA, cB0, cC}
    calcTransport.etaRef = myref_B
    calcTransport.Tref = Tref_my
    rch1: ReactionChem "1: A+B=>C" on all domains
      Ef = E
      ReactionExpression = UserDefined
      useArrhenius = 1
      bulkFwdOrder = 1
      formula = A+B=>C
      Q = -chem.r_1*dHrx
      Af = A
      r = chem.kf_1*chem.c_A
      ReactionHeatSource = UserDefined
    A: SpeciesChem "Species: A" on all domains | M = M_A; rho = rho_A
    B: SpeciesChem "Species: B" on all domains
      sType = solvent
      Cp = cpm_B
      speciesEnthalpy = UserDefined
      k = ke
      M = M_B
      rho = rho_B
    C: SpeciesChem "Species: C" on all domains | Cp = aA + aB*re.T; speciesEnthalpy = NASA; M = M_C; rho = rho_C
  tds: DilutedSpecies "Transport of Diluted Species" on all domains
    dependent variable cA = {cA, cC}
    cdm1: ConvectionDiffusionMigration "Transport Properties 1" (default) | D_cA = chem.D_A; D_cC = chem.D_C
    axi1: AxialSymmetry (default)
    nflx1: NoFlux (default)
    init1: init "Initial Values 1" (default)
    reac1: Reactions on domains 1 | R_cA_src = root.comp1.chem.R_A; R_cC_src = root.comp1.chem.R_C
    in1: Inflow on boundaries 2 | c0 = {cA0, 0}; BoundaryConditionType = FluxDanckwerts
    out1: Outflow on boundaries 3
  ht: HeatTransferInFluids on all domains
    dependent variable T
    fluid1: FluidHeatTransferModel "Fluid 1" (default)
      k_mat = root.comp1.chem.kRR
      rho_mat = root.comp1.chem.rho
      Cp_mat = root.comp1.chem.Cptot
      gamma_mat = userdef
      gamma = 1
      fluidType = gasLiquid
    init1: init "Initial Values 1" (default) | Tinit = T0
    axi1: AxialSymmetry (default)
    ins1: ThermalInsulation (default)
    hs1: HeatSource on domains 1 | Q0_src = root.comp1.chem.Qtot
    temp1: TemperatureBoundary "Temperature 1" on boundaries 2 | T0 = T0
    hf1: HeatFluxBoundary "Heat Flux 1" on boundaries 4 | q0 = -Uk*(T-Ta0)
    ofl1: ConvectiveOutflow "Outflow 1" on boundaries 3
  spf: LaminarFlow on all domains
    dependent variable u = {u, v, w}
    fp1: FluidProperties (default) | rho_mat = root.comp1.chem.rho; mu_mat = root.comp1.chem.eta
    init1: init "Initial Values 1" (default)
    axi1: AxialSymmetry (default)
    wallbc1: WallBC "Wall 1" (default)
    inl1: InletBoundary "Inlet 1" on boundaries 2 | BoundaryCondition = FullyDevelopedFlow; Uavfdf = u0
    out1: OutletBoundary "Outlet 1" on boundaries 3

Multiphysics
  nitf1: NonIsothermalFlow on all domains | Fluid_physics = spf; Heat_physics = ht
  rfd1: ReactingFlowDS "Reacting Flow, Diluted Species 1" on all domains | Fluid_physics = spf; Species_physics = tds

Mesh
  mesh1 "Mesh 1"
    size: MeshSizeDefault | hmax = 0.067; hmin = 3.0E-4; hcurve = 0.3; hgrad = 1.3
    map1: Map "Mapped 1" on remaining entities
      dis1: Distribution on boundaries 2, 3
        type = predefined
        reverse = on
        elemcount = 50
        elemratio = 0.01
        method = geometric
      dis2: Distribution on boundaries 1, 4
        type = predefined
        reverse = on
        elemcount = 200
        elemratio = 0.01
        method = geometric

Studies
  std1 "Study 1"
    stat: Stationary

Solver configurations
  sol1 "Solution 1" (study std1)
    v1: Variables "Dependent Variables 1"
    s1: Stationary "Stationary Solver 1"
      se1: Segregated
        maxsegiter = 200
        segstabacc = segcflcmp
        subinitcfl = 2
        subkppid = 0.6
        subkdpid = 0.02
        subcfltol = 0.075
        ss1: SegregatedStep "Velocity u, Pressure p"
          segvar = {comp1_u, comp1_p, comp1_spf_inl1_Pinlfdf}
          linsolver = d1
          subdamp = 0.5
        ss2: SegregatedStep "Temperature" | segvar = {comp1_T}; linsolver = d2; subdamp = 0.5
        ss3: SegregatedStep "Concentrations"
          segvar = {comp1_cA, comp1_cC}
          linsolver = d3
          subdamp = 0.35
          subtermconst = itertol
          subiter = 3
          subntolfact = 1
        ll1: LowerLimit | lowerlimit = comp1.T 0
      d1: Direct "Direct, fluid flow variables (spf)" | linsolver = pardiso; pivotperturb = 1.0E-13
      d2: Direct "Direct, temperature (ht)" | linsolver = pardiso; pivotperturb = 1.0E-13
      d3: Direct "Direct, concentrations (tds)" | linsolver = pardiso; pivotperturb = 1.0E-13

Datasets
  dset1: Solution | solution = sol1
  rev1: Revolve2D "Revolution 2D 1" | data = dset1; startangle = -90; revangle = 225
  cln1: CutLine2D | data = dset1; genpoints = {{0, 0}, {Ra, 0}}; genparadist = 0.5*L 1*L
  mir1: Mirror2D | data = dset1

Plots
  pg1: PlotGroup2D "Concentration, A (tds)" | data = dset1; prefixintitle = Species A:
    surf1: Surface | expr = cA
    str1: Streamline | expr = {tds.tflux_cAr, tds.tflux_cAz}; pointtype = arrow; arrowlength = logarithmic
  pg2: PlotGroup3D "Concentration, A, 3D (tds)" | data = rev1; typeintitle = off; prefixintitle = Species A:
    surf1: Surface | expr = cA
  pg3: PlotGroup2D "Concentration, C (tds)" | data = dset1; prefixintitle = Species C:
    surf1: Surface | expr = cC
    str1: Streamline | expr = {tds.tflux_cCr, tds.tflux_cCz}; pointtype = arrow; arrowlength = logarithmic
  pg4: PlotGroup3D "Concentration, C, 3D (tds)" | data = rev1; typeintitle = off; prefixintitle = Species C:
    surf1: Surface | expr = cC
  pg5: PlotGroup3D "Temperature, 3D (ht)" | data = rev1
    surf1: Surface | expr = T
  pg6: PlotGroup2D "Isothermal Contours (ht)" | data = dset1; dataisaxisym = on
    con1: Contour | expr = T; levelrounding = off
  pg7: PlotGroup2D "Velocity (spf)" | data = dset1; dataisaxisym = on
    surf1: Surface | expr = spf.U
  pg8: PlotGroup2D "Pressure (spf)" | data = dset1; dataisaxisym = on
    con1: Contour | expr = p; levelrounding = off
  pg9: PlotGroup3D "Velocity, 3D (spf)" | data = rev1
    surf1: Surface | expr = spf.U
  pg10: PlotGroup2D "Temperature, surface (mirrored)"
    data = mir1
    xlabel = Radial Location (m)
    ylabel = Axial Location (m)
    surf1: Surface | expr = T; descr = Temperature
  pg11: PlotGroup2D "Conversion, surface (mirrored)"
    data = mir1
    xlabel = Radial Location (m)
    ylabel = Axial Location (m)
    surf1: Surface | expr = xA; descr = Conversion species A
  pg12: PlotGroup1D "Temperature, profiles"
    data = cln1
    title = Radial Temperature Profiles
    xlabel = Radial Location (m)
    ylabel = Temperature (K)
    lngr1: LineGraph | expr = T; descr = Temperature; legends = {Inlet, Half Axial Location, Outlet}
  pg13: PlotGroup1D "Conversion, profiles"
    data = cln1
    title = Radial Conversion Profiles
    xlabel = Radial Location (m)
    ylabel = Conversion
    lngr1: LineGraph | expr = xA; descr = Conversion species A; legends = {Inlet, Half Axial Location, Outlet}