// COMSOL Multiphysics 5.6.0.401 model "Prob1_TankFlow.mph"
// Outline of the model tree

Parameters
  Mn_S = 0.018[kg/mol]  // Molar mass solvent
  Mn_A = 0.032[kg/mol]  // Molar mass A
  Mn_B = 0.032[kg/mol]  // Molar mass B
  density_S = 1000[kg/m^3]  // Density solvent
  cinit_S = density_S/Mn_S  // Initial concentration of solvent in tanks
  kf_reaction = (1/600)[1/s]  // Rate constant forward reaction
  Vr_init_tank1 = 1[m^3]  // Initial reactor volume. tank 1
  Vr_init_tank2 = 1.5[m^3]  // Initial reactor volume. tank 2
  v_inlet = 1[m^3/min]  // Volumetric feed rate into tank 1
  cinlet_A1 = 1000[mol/m^3]  // Inlet concentration species A, tank 1
  v_fresh2 = 0.5[m^3/min]  // Fresh volumetric feed rate into tank 2
  cfresh2_A = 1000[mol/m^3]  // Fresh inlet feed concentration species A to tank 2
  cinlet_S = cinit_S  // Inlet concentration solvent
  v_outlet1 = 0.9[m^3/min]  // Volumetric outlet rate from tank 1
  v_outlet2 = 1[m^3/min]  // Volumetric outlet rate from tank 2

Physics
  re: ReactionEng "Reaction Engineering"
    reactor.reactor = cstrmass
    reactor.reactorparsource = UserDefined
    reactor.v = v_outlet1
    mixture.mixture = liquid
    inits1: SpeciesInitialValue "Initial Values 1" | initialValue = {0, 0, cinit_S}; Vr0 = Vr_init_tank1
    rch1: ReactionChem "1: A=>B" | formula = A=>B; kf = kf_reaction
    A: SpeciesChem "Species: A" | M = Mn_A
    B: SpeciesChem "Species: B" | M = Mn_B
    S: SpeciesChem "Species: S" | sType = solvent; M = Mn_S; rho = density_S
    feed1: FeedStream "Feed Inlet 1" | vf = v_inlet; FeedSpeciesConcentration = {cinlet_A1, 0, cinlet_S}
  re2: ReactionEng "Reaction Engineering 2"
    reactor.reactor = cstrmass
    reactor.reactorparsource = UserDefined
    reactor.v = v_outlet2
    mixture.mixture = liquid
    inits1: SpeciesInitialValue "Initial Values 1" | initialValue = {0, 0, cinit_S}; Vr0 = Vr_init_tank2
    rch1: ReactionChem "1: A=>B" | formula = A=>B; kf = kf_reaction
    A: SpeciesChem "Species: A" | M = Mn_A
    B: SpeciesChem "Species: B" | M = Mn_B
    S: SpeciesChem "Species: S" | sType = solvent; M = Mn_S; rho = density_S
    feed1: FeedStream "Feed Inlet 1 - from tank 1" | vf = v_outlet1; FeedSpeciesConcentration = {re.c_A, re.c_B, re.c_S}
    feed2: FeedStream "Feed Inlet 2 - fresh" | vf = v_fresh2; FeedSpeciesConcentration = {cfresh2_A, 0, cinlet_S}

Studies
  std1 "Study 1"
    time: Transient "Time Dependent" | tunit = min; tlist = range(0,0.1,120)

Solver configurations
  sol1 "Solution 1" (study std1)
    v1: Variables "Dependent Variables 1"
    t1: Time "Time-Dependent Solver 1" | tlist = range(0,0.1,120); tout = tsteps; rtol = 1.0E-5
      dDef: Direct
      fc1: FullyCoupled | linsolver = dDef; dtech = auto
      st1: StopCondition
        stopcondterminateon = {true, true}
        stopconddesc = {Stop expression 1, Stop expression 2}
        stopcondarr = {comp1.re.Vr<=Vr_init_tank1*0.01, comp1.re2.Vr<=Vr_init_tank2*0.01}

Datasets
  dset1: Solution | solution = sol1

Plots
  pg1: PlotGroup1D "Concentrations in tanks" | data = dset1
    glob1: Global
      expr = {re.c_A, re.c_B}
      unit = {mol/m^3, mol/m^3}
      descr = {Concentration, Concentration}
      legends = {A in tank 1, B in tank 1}
    glob2: Global
      expr = {re2.c_A, re2.c_B}
      unit = {mol/m^3, mol/m^3}
      descr = {Concentration, Concentration}
      legends = {A in tank 2, B in tank 2}
  pg2: PlotGroup1D "Volume in tanks" | data = dset1
    glob1: Global | expr = re.Vr; unit = m^3; descr = Reactor volume; legends = {Tank 1, }
    glob2: Global | expr = re2.Vr; unit = m^3; descr = Reactor volume; legends = {Tank 2, }