// COMSOL Multiphysics 5.6.0.401 model "PS9_prob1.mph"
// Outline of the model tree

Parameters
  NA = 6.02e23  // avrogado

Physics
  re: ReactionEng "Reaction Engineering"
    energybalance.T = 2000[K]
    inits1: SpeciesInitialValue "Initial Values 1"
      initialValue = {29.7, 0, 0, 3.76, 0, 0, 1.66e-18, 0, 1.66e-18, 0, 0, 1, 0, 7.52, 0}
    rch1: ReactionChem "1: CH4 + M <=> CH3 + H + M"
      formula = CH4+M<=>CH3+H+M
      kf = 7.2e-17*NA [cm^3/(s*mol)]
      kr = 3.05e-31*NA^2 [cm^6/(s*mol^2)]
    rch2: ReactionChem "2: CH4 + OH <=> CH3 + H2O"
      formula = CH4+OH<=>CH3+H2O
      kf = 4.3e-11*NA [cm^3/(s*mol)]
      kr = 1.74e-13*NA [cm^3/(s*mol)]
    rch3: ReactionChem "3: CH4+ H <=> CH3 + H2"
      formula = CH4+H<=>CH3+H2
      kf = 3.3e-11*NA [cm^3/(s*mol)]
      kr = 1.34e-12*NA [cm^3/(s*mol)]
    rch4: ReactionChem "4: CH4+O <=>CH3+OH"
      formula = CH4+O<=>CH3+OH
      kf = 3.6e-12*NA [cm^3/(s*mol)]
      kr = 1.1e-13*NA [cm^3/(s*mol)]
    rch5: ReactionChem "5: CH3+O <=>CH2O+H"
      formula = CH3+O<=>CH2O+H
      kf = 1.66e-10*NA [cm^3/(s*mol)]
      kr = 8.8e-17*NA [cm^3/(s*mol)]
    rch6: ReactionChem "6: CH3+O2<=> CH2O+OH"
      formula = CH3+O2<=>CH2O+OH
      kf = 3.32e-14*NA [cm^3/(s*mol)]
      kr = 7.2e-20*NA [cm^3/(s*mol)]
    rch7: ReactionChem "7: CH2O+O <=> CHO+OH"
      formula = CH2O+O<=>CHO+OH
      kf = 2.63e-11*NA [cm^3/(s*mol)]
      kr = 1.5e-14*NA [cm^3/(s*mol)]
    rch8: ReactionChem "8: CH2O+OH <=> CHO+ H2O"
      formula = CH2O+OH<=>CHO+H2O
      kf = 1.84e-10*NA [cm^3/(s*mol)]
      kr = 1.42e-14*NA [cm^3/(s*mol)]
    rch9: ReactionChem "9: CH2O+ H <=> CHO+ H2"
      formula = CH2O+H<=>CHO+H2
      kf = 8.7e-12*NA [cm^3/(s*mol)]
      kr = 7e-15*NA [cm^3/(s*mol)]
    rch10: ReactionChem "10: CH2O+M <=>CHO+H+M"
      formula = CH2O+M<=>CHO+H+M
      kf = 6.38e-16*NA [cm^3/(s*mol)]
      kr = 5.4e-32*NA^2 [cm^6/(s*mol^2)]
    rch11: ReactionChem "11: CHO+O<=> CO+OH"
      formula = CHO+O<=>CO+OH
      kf = 1.66e-10*NA [cm^3/(s*mol)]
      kr = 1.9e-19*NA [cm^3/(s*mol)]
    rch12: ReactionChem "12: CHO+OH <=>CO+H2O"
      formula = CHO+OH<=>CO+H2O
      kf = 1.66e-10*NA [cm^3/(s*mol)]
      kr = 2.1e-20*NA [cm^3/(s*mol)]
    rch13: ReactionChem "13: CHO+ H <=>CO+H2"
      formula = CHO+H<=>CO+H2
      kf = 3.32e-10*NA [cm^3/(s*mol)]
      kr = 4.6e-19*NA [cm^3/(s*mol)]
    rch14: ReactionChem "14: CHO+M <=>CO+H+M"
      formula = CHO+M<=>CO+H+M
      kf = 7e-14*NA [cm^3/(s*mol)]
      kr = 1e-35*NA^2 [cm^6/(s*mol^2)]
    rch15: ReactionChem "15: CO+OH <=> CO2+ H"
      formula = CO+OH<=>CO2+H
      kf = 8.9e-13*NA [cm^3/(s*mol)]
      kr = 3.8e-13*NA [cm^3/(s*mol)]
    rch16: ReactionChem "16: H2+OH <=> H+H2O"
      formula = H2+OH<=>H+H2O
      kf = 3e-11*NA [cm^3/(s*mol)]
      kr = 3e-12*NA [cm^3/(s*mol)]
    rch17: ReactionChem "17: H2+O <=>H+OH"
      formula = H2+O<=>H+OH
      kf = 1.2e-11*NA [cm^3/(s*mol)]
      kr = 1.1e-11*NA [cm^3/(s*mol)]
    rch18: ReactionChem "18: H+O2 <=> O+OH"
      formula = H+O2<=>O+OH
      kf = 5.34e-12*NA [cm^3/(s*mol)]
      kr = 2.3e-11*NA [cm^3/(s*mol)]
    rch19: ReactionChem "19: H+OH+Ar <=> H2O+Ar"
      formula = H+OH+Ar<=>H2O+Ar
      kf = 5.8e-33*NA^2 [cm^6/(s*mol^2)]
      kr = 5.14e-21*NA [cm^3/(s*mol)]
    rch20: ReactionChem "20: H+OH+ H2O <=> H2O+ H2O"
      formula = H+OH+H2O<=>H2O+H2O
      kf = 9.65e-32*NA^2 [cm^6/(s*mol^2)]
      kr = 8.56e-20*NA [cm^3/(s*mol)]
    rch21: ReactionChem "21: H+HO2 <=> OH+OH"
      formula = H+HO2<=>OH+OH
      kf = 2.58e-10*NA [cm^3/(s*mol)]
      kr = 1e-15*NA [cm^3/(s*mol)]
    rch22: ReactionChem "22: H+O2+M <=> HO2+M"
      formula = H+O2+M<=>HO2+M
      kf = 5.32e-33*NA^2 [cm^6/(s*mol^2)]
      kr = 3.6e-14*NA [cm^3/(s*mol)]
    rch23: ReactionChem "23: OH+OH <=> H2O+O"
      formula = OH+OH<=>H2O+O
      kf = 1.57e-11*NA [cm^3/(s*mol)]
      kr = 2e-12*NA [cm^3/(s*mol)]
    CH4: SpeciesChem "Species: CH4"
      sisDef = 1
      sType = volumetric
      sSequenceNo = 1
      SpeciesSource = Reaction
      specLabel = CH4
      Tlo = 300[K]
      Tmid = 1000[K]
      Thi = 5000[K]
      h = R_const*((re.T<=re.Tlo_CH4)*(re.aLo6_CH4+re.Tlo_CH4*(re.aLo1_CH4+0.5*re.Tlo_CH4*(re.aLo2_CH4+2*re.Tlo_CH4*(re.aLo3_CH4+0.75*re.Tlo_CH4*(re.aLo4_CH4+0.8*re.Tlo_CH4*re.aLo5_CH4))/3)))+(re.T>re.Tlo_CH4)*(re.T<=re.Tmid_CH4)*(re.aLo6_CH4+re.T*(re.aLo1_CH4+0.5*re.T*(re.aLo2_CH4+2*re.T*(re.aLo3_CH4+0.75*re.T*(re.aLo4_CH4+0.8*re.T*re.aLo5_CH4))/3)))+(re.T>re.Tmid_CH4)*(re.T<=re.Thi_CH4)*(re.aHi6_CH4+re.T*(re.aHi1_CH4+0.5*re.T*(re.aHi2_CH4+2*re.T*(re.aHi3_CH4+0.75*re.T*(re.aHi4_CH4+0.8*re.T*re.aHi5_CH4))/3)))+(re.T>re.Thi_CH4)*(re.aHi6_CH4+re.Thi_CH4*(re.aHi1_CH4+0.5*re.Thi_CH4*(re.aHi2_CH4+2*re.Thi_CH4*(re.aHi3_CH4+0.75*re.Thi_CH4*(re.aHi4_CH4+0.8*re.Thi_CH4*re.aHi5_CH4))/3))))
      s = R_const*((re.T<=re.Tlo_CH4)*(re.aLo7_CH4+re.aLo1_CH4*log(re.T/1[K])+re.Tlo_CH4*(re.aLo2_CH4+0.5*re.Tlo_CH4*(re.aLo3_CH4+2*re.Tlo_CH4*(re.aLo4_CH4+0.75*re.Tlo_CH4*re.aLo5_CH4)/3)))+(re.T>re.Tlo_CH4)*(re.T<=re.Tmid_CH4)*(re.aLo7_CH4+re.aLo1_CH4*log(re.T/1[K])+re.T*(re.aLo2_CH4+0.5*re.T*(re.aLo3_CH4+2*re.T*(re.aLo4_CH4+0.75*re.T*re.aLo5_CH4)/3)))+(re.T>re.Tmid_CH4)*(re.T<=re.Thi_CH4)*(re.aHi7_CH4+re.aHi1_CH4*log(re.T/1[K])+re.T*(re.aHi2_CH4+0.5*re.T*(re.aHi3_CH4+2*re.T*(re.aHi4_CH4+0.75*re.T*re.aHi5_CH4)/3)))+(re.T>re.Thi_CH4)*(re.aHi7_CH4+re.aHi1_CH4*log(re.T/1[K])+re.Thi_CH4*(re.aHi2_CH4+0.5*re.Thi_CH4*(re.aHi3_CH4+2*re.Thi_CH4*(re.aHi4_CH4+0.75*re.Thi_CH4*re.aHi5_CH4)/3))))
      Cp = R_const*((re.T<=re.Tlo_CH4)*(re.aLo1_CH4+re.Tlo_CH4*(re.aLo2_CH4+re.Tlo_CH4*(re.aLo3_CH4+re.Tlo_CH4*(re.aLo4_CH4+re.Tlo_CH4*re.aLo5_CH4))))+(re.T>re.Tlo_CH4)*(re.T<=re.Tmid_CH4)*(re.aLo1_CH4+re.T*(re.aLo2_CH4+re.T*(re.aLo3_CH4+re.T*(re.aLo4_CH4+re.T*re.aLo5_CH4))))+(re.T>re.Tmid_CH4)*(re.T<=re.Thi_CH4)*(re.aHi1_CH4+re.T*(re.aHi2_CH4+re.T*(re.aHi3_CH4+re.T*(re.aHi4_CH4+re.T*re.aHi5_CH4))))+(re.T>re.Thi_CH4)*(re.aHi1_CH4+re.Thi_CH4*(re.aHi2_CH4+re.Thi_CH4*(re.aHi3_CH4+re.Thi_CH4*(re.aHi4_CH4+re.Thi_CH4*re.aHi5_CH4)))))
      sigma = 3.458[angstrom]
      epsilonkb = 107.4[K]
      mu = 0[C*m]
      ActivityCoefficient = 1
      speciesEnthalpy = NASA
      ReactionTagInSpecies = {rch1, rch2, rch3, rch4}
      updatefeat = 1
      GasThermalConductivitySel = Automatic
      GasDiffusivitySel = Automatic
      LiquidDiffusivitySel = Automatic
      k = 0.02[W/(m*K)]
      De = 1e-5[m^2/s]
      SpeciesrateSelection = Automatic
      specName = CH4
      R = -re.r_1-re.r_2-re.r_3-re.r_4
      Speciesrate = 0[mol/(m^3*s)]
      SpeciesrateSurf = 0[mol/(m^2*s)]
      Speciessurfacerate = 0[mol/(m^2*s)]
      typeGUIControl = volumetric
      mixtureSolvent = 1
      Dgas = 10^-5[m^2/s]
      Dliquid = 10^-8[m^2/s]
      kgas = 0.015[W/(m*K)]
      MolarMassSelection = Thermodynamics
      M = 16.04252[g/mol]
      liquidDensitySel = Thermodynamics
      rho = 1000[kg/m^3]
      LiquidThermalConductivitySel = Thermodynamics
    M: SpeciesChem "Species: M"
      sisDef = 1
      sType = volumetric
      sSequenceNo = 2
      SpeciesSource = Reaction
      specLabel = M
      Tlo = 300[K]
      Tmid = 1000[K]
      Thi = 5000[K]
      h = R_const*((re.T<=re.Tlo_M)*(re.aLo6_M+re.Tlo_M*(re.aLo1_M+0.5*re.Tlo_M*(re.aLo2_M+2*re.Tlo_M*(re.aLo3_M+0.75*re.Tlo_M*(re.aLo4_M+0.8*re.Tlo_M*re.aLo5_M))/3)))+(re.T>re.Tlo_M)*(re.T<=re.Tmid_M)*(re.aLo6_M+re.T*(re.aLo1_M+0.5*re.T*(re.aLo2_M+2*re.T*(re.aLo3_M+0.75*re.T*(re.aLo4_M+0.8*re.T*re.aLo5_M))/3)))+(re.T>re.Tmid_M)*(re.T<=re.Thi_M)*(re.aHi6_M+re.T*(re.aHi1_M+0.5*re.T*(re.aHi2_M+2*re.T*(re.aHi3_M+0.75*re.T*(re.aHi4_M+0.8*re.T*re.aHi5_M))/3)))+(re.T>re.Thi_M)*(re.aHi6_M+re.Thi_M*(re.aHi1_M+0.5*re.Thi_M*(re.aHi2_M+2*re.Thi_M*(re.aHi3_M+0.75*re.Thi_M*(re.aHi4_M+0.8*re.Thi_M*re.aHi5_M))/3))))
      s = R_const*((re.T<=re.Tlo_M)*(re.aLo7_M+re.aLo1_M*log(re.T/1[K])+re.Tlo_M*(re.aLo2_M+0.5*re.Tlo_M*(re.aLo3_M+2*re.Tlo_M*(re.aLo4_M+0.75*re.Tlo_M*re.aLo5_M)/3)))+(re.T>re.Tlo_M)*(re.T<=re.Tmid_M)*(re.aLo7_M+re.aLo1_M*log(re.T/1[K])+re.T*(re.aLo2_M+0.5*re.T*(re.aLo3_M+2*re.T*(re.aLo4_M+0.75*re.T*re.aLo5_M)/3)))+(re.T>re.Tmid_M)*(re.T<=re.Thi_M)*(re.aHi7_M+re.aHi1_M*log(re.T/1[K])+re.T*(re.aHi2_M+0.5*re.T*(re.aHi3_M+2*re.T*(re.aHi4_M+0.75*re.T*re.aHi5_M)/3)))+(re.T>re.Thi_M)*(re.aHi7_M+re.aHi1_M*log(re.T/1[K])+re.Thi_M*(re.aHi2_M+0.5*re.Thi_M*(re.aHi3_M+2*re.Thi_M*(re.aHi4_M+0.75*re.Thi_M*re.aHi5_M)/3))))
      Cp = R_const*((re.T<=re.Tlo_M)*(re.aLo1_M+re.Tlo_M*(re.aLo2_M+re.Tlo_M*(re.aLo3_M+re.Tlo_M*(re.aLo4_M+re.Tlo_M*re.aLo5_M))))+(re.T>re.Tlo_M)*(re.T<=re.Tmid_M)*(re.aLo1_M+re.T*(re.aLo2_M+re.T*(re.aLo3_M+re.T*(re.aLo4_M+re.T*re.aLo5_M))))+(re.T>re.Tmid_M)*(re.T<=re.Thi_M)*(re.aHi1_M+re.T*(re.aHi2_M+re.T*(re.aHi3_M+re.T*(re.aHi4_M+re.T*re.aHi5_M))))+(re.T>re.Thi_M)*(re.aHi1_M+re.Thi_M*(re.aHi2_M+re.Thi_M*(re.aHi3_M+re.Thi_M*(re.aHi4_M+re.Thi_M*re.aHi5_M)))))
      sigma = 3.458[angstrom]
      epsilonkb = 107.4[K]
      mu = 0[C*m]
      ActivityCoefficient = 1
      speciesEnthalpy = NASA
      ReactionTagInSpecies = {rch1, rch10, rch14, rch22}
      updatefeat = 1
      GasThermalConductivitySel = Automatic
      GasDiffusivitySel = Automatic
      LiquidDiffusivitySel = Automatic
      k = 0.02[W/(m*K)]
      De = 1e-5[m^2/s]
      SpeciesrateSelection = Automatic
      specName = M
      Speciesrate = 0[mol/(m^3*s)]
      SpeciesrateSurf = 0[mol/(m^2*s)]
      Speciessurfacerate = 0[mol/(m^2*s)]
      typeGUIControl = volumetric
      mixtureSolvent = 1
      Dgas = 10^-5[m^2/s]
      Dliquid = 10^-8[m^2/s]
      kgas = 0.015[W/(m*K)]
      MolarMassSelection = Thermodynamics
      M = 0.0[kg/mol]
      liquidDensitySel = Thermodynamics
      rho = 1000[kg/m^3]
      LiquidThermalConductivitySel = Thermodynamics
    CH3: SpeciesChem "Species: CH3"
      sisDef = 1
      sType = volumetric
      sSequenceNo = 3
      SpeciesSource = Reaction
      specLabel = CH3
      Tlo = 300[K]
      Tmid = 1000[K]
      Thi = 5000[K]
      h = R_const*((re.T<=re.Tlo_CH3)*(re.aLo6_CH3+re.Tlo_CH3*(re.aLo1_CH3+0.5*re.Tlo_CH3*(re.aLo2_CH3+2*re.Tlo_CH3*(re.aLo3_CH3+0.75*re.Tlo_CH3*(re.aLo4_CH3+0.8*re.Tlo_CH3*re.aLo5_CH3))/3)))+(re.T>re.Tlo_CH3)*(re.T<=re.Tmid_CH3)*(re.aLo6_CH3+re.T*(re.aLo1_CH3+0.5*re.T*(re.aLo2_CH3+2*re.T*(re.aLo3_CH3+0.75*re.T*(re.aLo4_CH3+0.8*re.T*re.aLo5_CH3))/3)))+(re.T>re.Tmid_CH3)*(re.T<=re.Thi_CH3)*(re.aHi6_CH3+re.T*(re.aHi1_CH3+0.5*re.T*(re.aHi2_CH3+2*re.T*(re.aHi3_CH3+0.75*re.T*(re.aHi4_CH3+0.8*re.T*re.aHi5_CH3))/3)))+(re.T>re.Thi_CH3)*(re.aHi6_CH3+re.Thi_CH3*(re.aHi1_CH3+0.5*re.Thi_CH3*(re.aHi2_CH3+2*re.Thi_CH3*(re.aHi3_CH3+0.75*re.Thi_CH3*(re.aHi4_CH3+0.8*re.Thi_CH3*re.aHi5_CH3))/3))))
      s = R_const*((re.T<=re.Tlo_CH3)*(re.aLo7_CH3+re.aLo1_CH3*log(re.T/1[K])+re.Tlo_CH3*(re.aLo2_CH3+0.5*re.Tlo_CH3*(re.aLo3_CH3+2*re.Tlo_CH3*(re.aLo4_CH3+0.75*re.Tlo_CH3*re.aLo5_CH3)/3)))+(re.T>re.Tlo_CH3)*(re.T<=re.Tmid_CH3)*(re.aLo7_CH3+re.aLo1_CH3*log(re.T/1[K])+re.T*(re.aLo2_CH3+0.5*re.T*(re.aLo3_CH3+2*re.T*(re.aLo4_CH3+0.75*re.T*re.aLo5_CH3)/3)))+(re.T>re.Tmid_CH3)*(re.T<=re.Thi_CH3)*(re.aHi7_CH3+re.aHi1_CH3*log(re.T/1[K])+re.T*(re.aHi2_CH3+0.5*re.T*(re.aHi3_CH3+2*re.T*(re.aHi4_CH3+0.75*re.T*re.aHi5_CH3)/3)))+(re.T>re.Thi_CH3)*(re.aHi7_CH3+re.aHi1_CH3*log(re.T/1[K])+re.Thi_CH3*(re.aHi2_CH3+0.5*re.Thi_CH3*(re.aHi3_CH3+2*re.Thi_CH3*(re.aHi4_CH3+0.75*re.Thi_CH3*re.aHi5_CH3)/3))))
      Cp = R_const*((re.T<=re.Tlo_CH3)*(re.aLo1_CH3+re.Tlo_CH3*(re.aLo2_CH3+re.Tlo_CH3*(re.aLo3_CH3+re.Tlo_CH3*(re.aLo4_CH3+re.Tlo_CH3*re.aLo5_CH3))))+(re.T>re.Tlo_CH3)*(re.T<=re.Tmid_CH3)*(re.aLo1_CH3+re.T*(re.aLo2_CH3+re.T*(re.aLo3_CH3+re.T*(re.aLo4_CH3+re.T*re.aLo5_CH3))))+(re.T>re.Tmid_CH3)*(re.T<=re.Thi_CH3)*(re.aHi1_CH3+re.T*(re.aHi2_CH3+re.T*(re.aHi3_CH3+re.T*(re.aHi4_CH3+re.T*re.aHi5_CH3))))+(re.T>re.Thi_CH3)*(re.aHi1_CH3+re.Thi_CH3*(re.aHi2_CH3+re.Thi_CH3*(re.aHi3_CH3+re.Thi_CH3*(re.aHi4_CH3+re.Thi_CH3*re.aHi5_CH3)))))
      sigma = 3.458[angstrom]
      epsilonkb = 107.4[K]
      mu = 0[C*m]
      ActivityCoefficient = 1
      speciesEnthalpy = NASA
      ReactionTagInSpecies = {rch1, rch2, rch3, rch4, rch5, rch6}
      updatefeat = 1
      GasThermalConductivitySel = Automatic
      GasDiffusivitySel = Automatic
      LiquidDiffusivitySel = Automatic
      k = 0.02[W/(m*K)]
      De = 1e-5[m^2/s]
      SpeciesrateSelection = Automatic
      specName = CH3
      R = re.r_1+re.r_2+re.r_3+re.r_4-re.r_5-re.r_6
      Speciesrate = 0[mol/(m^3*s)]
      SpeciesrateSurf = 0[mol/(m^2*s)]
      Speciessurfacerate = 0[mol/(m^2*s)]
      typeGUIControl = volumetric
      mixtureSolvent = 1
      Dgas = 10^-5[m^2/s]
      Dliquid = 10^-8[m^2/s]
      kgas = 0.015[W/(m*K)]
      MolarMassSelection = Thermodynamics
      M = 15.03454[g/mol]
      liquidDensitySel = Thermodynamics
      rho = 1000[kg/m^3]
      LiquidThermalConductivitySel = Thermodynamics
    H: SpeciesChem "Species: H"
      sisDef = 1
      sType = volumetric
      sSequenceNo = 4
      SpeciesSource = Reaction
      specLabel = H
      Tlo = 300[K]
      Tmid = 1000[K]
      Thi = 5000[K]
      h = R_const*((re.T<=re.Tlo_H)*(re.aLo6_H+re.Tlo_H*(re.aLo1_H+0.5*re.Tlo_H*(re.aLo2_H+2*re.Tlo_H*(re.aLo3_H+0.75*re.Tlo_H*(re.aLo4_H+0.8*re.Tlo_H*re.aLo5_H))/3)))+(re.T>re.Tlo_H)*(re.T<=re.Tmid_H)*(re.aLo6_H+re.T*(re.aLo1_H+0.5*re.T*(re.aLo2_H+2*re.T*(re.aLo3_H+0.75*re.T*(re.aLo4_H+0.8*re.T*re.aLo5_H))/3)))+(re.T>re.Tmid_H)*(re.T<=re.Thi_H)*(re.aHi6_H+re.T*(re.aHi1_H+0.5*re.T*(re.aHi2_H+2*re.T*(re.aHi3_H+0.75*re.T*(re.aHi4_H+0.8*re.T*re.aHi5_H))/3)))+(re.T>re.Thi_H)*(re.aHi6_H+re.Thi_H*(re.aHi1_H+0.5*re.Thi_H*(re.aHi2_H+2*re.Thi_H*(re.aHi3_H+0.75*re.Thi_H*(re.aHi4_H+0.8*re.Thi_H*re.aHi5_H))/3))))
      s = R_const*((re.T<=re.Tlo_H)*(re.aLo7_H+re.aLo1_H*log(re.T/1[K])+re.Tlo_H*(re.aLo2_H+0.5*re.Tlo_H*(re.aLo3_H+2*re.Tlo_H*(re.aLo4_H+0.75*re.Tlo_H*re.aLo5_H)/3)))+(re.T>re.Tlo_H)*(re.T<=re.Tmid_H)*(re.aLo7_H+re.aLo1_H*log(re.T/1[K])+re.T*(re.aLo2_H+0.5*re.T*(re.aLo3_H+2*re.T*(re.aLo4_H+0.75*re.T*re.aLo5_H)/3)))+(re.T>re.Tmid_H)*(re.T<=re.Thi_H)*(re.aHi7_H+re.aHi1_H*log(re.T/1[K])+re.T*(re.aHi2_H+0.5*re.T*(re.aHi3_H+2*re.T*(re.aHi4_H+0.75*re.T*re.aHi5_H)/3)))+(re.T>re.Thi_H)*(re.aHi7_H+re.aHi1_H*log(re.T/1[K])+re.Thi_H*(re.aHi2_H+0.5*re.Thi_H*(re.aHi3_H+2*re.Thi_H*(re.aHi4_H+0.75*re.Thi_H*re.aHi5_H)/3))))
      Cp = R_const*((re.T<=re.Tlo_H)*(re.aLo1_H+re.Tlo_H*(re.aLo2_H+re.Tlo_H*(re.aLo3_H+re.Tlo_H*(re.aLo4_H+re.Tlo_H*re.aLo5_H))))+(re.T>re.Tlo_H)*(re.T<=re.Tmid_H)*(re.aLo1_H+re.T*(re.aLo2_H+re.T*(re.aLo3_H+re.T*(re.aLo4_H+re.T*re.aLo5_H))))+(re.T>re.Tmid_H)*(re.T<=re.Thi_H)*(re.aHi1_H+re.T*(re.aHi2_H+re.T*(re.aHi3_H+re.T*(re.aHi4_H+re.T*re.aHi5_H))))+(re.T>re.Thi_H)*(re.aHi1_H+re.Thi_H*(re.aHi2_H+re.Thi_H*(re.aHi3_H+re.Thi_H*(re.aHi4_H+re.Thi_H*re.aHi5_H)))))
      sigma = 3.458[angstrom]
      epsilonkb = 107.4[K]
      mu = 0[C*m]
      ActivityCoefficient = 1
      speciesEnthalpy = NASA
      ReactionTagInSpecies = {rch1, rch3, rch5, rch9, rch10, rch13, rch14, rch15, rch16, rch17, rch18, rch19, rch20, rch21, rch22}
      updatefeat = 1
      GasThermalConductivitySel = Automatic
      GasDiffusivitySel = Automatic
      LiquidDiffusivitySel = Automatic
      k = 0.02[W/(m*K)]
      De = 1e-5[m^2/s]
      SpeciesrateSelection = Automatic
      specName = H
      R = re.r_1-re.r_3+re.r_5-re.r_9+re.r_10-re.r_13+re.r_14+re.r_15+re.r_16+re.r_17-re.r_18-re.r_19-re.r_20-re.r_21-re.r_22
      Speciesrate = 0[mol/(m^3*s)]
      SpeciesrateSurf = 0[mol/(m^2*s)]
      Speciessurfacerate = 0[mol/(m^2*s)]
      typeGUIControl = volumetric
      mixtureSolvent = 1
      Dgas = 10^-5[m^2/s]
      Dliquid = 10^-8[m^2/s]
      kgas = 0.015[W/(m*K)]
      MolarMassSelection = Thermodynamics
      M = 1.00798[g/mol]
      liquidDensitySel = Thermodynamics
      rho = 1000[kg/m^3]
      LiquidThermalConductivitySel = Thermodynamics
    OH: SpeciesChem "Species: OH"
      sisDef = 1
      sType = volumetric
      sSequenceNo = 5
      SpeciesSource = Reaction
      specLabel = OH
      Tlo = 300[K]
      Tmid = 1000[K]
      Thi = 5000[K]
      h = R_const*((re.T<=re.Tlo_OH)*(re.aLo6_OH+re.Tlo_OH*(re.aLo1_OH+0.5*re.Tlo_OH*(re.aLo2_OH+2*re.Tlo_OH*(re.aLo3_OH+0.75*re.Tlo_OH*(re.aLo4_OH+0.8*re.Tlo_OH*re.aLo5_OH))/3)))+(re.T>re.Tlo_OH)*(re.T<=re.Tmid_OH)*(re.aLo6_OH+re.T*(re.aLo1_OH+0.5*re.T*(re.aLo2_OH+2*re.T*(re.aLo3_OH+0.75*re.T*(re.aLo4_OH+0.8*re.T*re.aLo5_OH))/3)))+(re.T>re.Tmid_OH)*(re.T<=re.Thi_OH)*(re.aHi6_OH+re.T*(re.aHi1_OH+0.5*re.T*(re.aHi2_OH+2*re.T*(re.aHi3_OH+0.75*re.T*(re.aHi4_OH+0.8*re.T*re.aHi5_OH))/3)))+(re.T>re.Thi_OH)*(re.aHi6_OH+re.Thi_OH*(re.aHi1_OH+0.5*re.Thi_OH*(re.aHi2_OH+2*re.Thi_OH*(re.aHi3_OH+0.75*re.Thi_OH*(re.aHi4_OH+0.8*re.Thi_OH*re.aHi5_OH))/3))))
      s = R_const*((re.T<=re.Tlo_OH)*(re.aLo7_OH+re.aLo1_OH*log(re.T/1[K])+re.Tlo_OH*(re.aLo2_OH+0.5*re.Tlo_OH*(re.aLo3_OH+2*re.Tlo_OH*(re.aLo4_OH+0.75*re.Tlo_OH*re.aLo5_OH)/3)))+(re.T>re.Tlo_OH)*(re.T<=re.Tmid_OH)*(re.aLo7_OH+re.aLo1_OH*log(re.T/1[K])+re.T*(re.aLo2_OH+0.5*re.T*(re.aLo3_OH+2*re.T*(re.aLo4_OH+0.75*re.T*re.aLo5_OH)/3)))+(re.T>re.Tmid_OH)*(re.T<=re.Thi_OH)*(re.aHi7_OH+re.aHi1_OH*log(re.T/1[K])+re.T*(re.aHi2_OH+0.5*re.T*(re.aHi3_OH+2*re.T*(re.aHi4_OH+0.75*re.T*re.aHi5_OH)/3)))+(re.T>re.Thi_OH)*(re.aHi7_OH+re.aHi1_OH*log(re.T/1[K])+re.Thi_OH*(re.aHi2_OH+0.5*re.Thi_OH*(re.aHi3_OH+2*re.Thi_OH*(re.aHi4_OH+0.75*re.Thi_OH*re.aHi5_OH)/3))))
      Cp = R_const*((re.T<=re.Tlo_OH)*(re.aLo1_OH+re.Tlo_OH*(re.aLo2_OH+re.Tlo_OH*(re.aLo3_OH+re.Tlo_OH*(re.aLo4_OH+re.Tlo_OH*re.aLo5_OH))))+(re.T>re.Tlo_OH)*(re.T<=re.Tmid_OH)*(re.aLo1_OH+re.T*(re.aLo2_OH+re.T*(re.aLo3_OH+re.T*(re.aLo4_OH+re.T*re.aLo5_OH))))+(re.T>re.Tmid_OH)*(re.T<=re.Thi_OH)*(re.aHi1_OH+re.T*(re.aHi2_OH+re.T*(re.aHi3_OH+re.T*(re.aHi4_OH+re.T*re.aHi5_OH))))+(re.T>re.Thi_OH)*(re.aHi1_OH+re.Thi_OH*(re.aHi2_OH+re.Thi_OH*(re.aHi3_OH+re.Thi_OH*(re.aHi4_OH+re.Thi_OH*re.aHi5_OH)))))
      sigma = 3.458[angstrom]
      epsilonkb = 107.4[K]
      mu = 0[C*m]
      ActivityCoefficient = 1
      speciesEnthalpy = NASA
      ReactionTagInSpecies = {rch2, rch4, rch6, rch7, rch8, rch11, rch12, rch15, rch16, rch17, rch18, rch19, rch20, rch21, rch23}
      updatefeat = 1
      GasThermalConductivitySel = Automatic
      GasDiffusivitySel = Automatic
      LiquidDiffusivitySel = Automatic
      k = 0.02[W/(m*K)]
      De = 1e-5[m^2/s]
      SpeciesrateSelection = Automatic
      specName = OH
      R = -re.r_2+re.r_4+re.r_6+re.r_7-re.r_8+re.r_11-re.r_12-re.r_15-re.r_16+re.r_17+re.r_18-re.r_19-re.r_20+2*re.r_21-2*re.r_23
      Speciesrate = 0[mol/(m^3*s)]
      SpeciesrateSurf = 0[mol/(m^2*s)]
      Speciessurfacerate = 0[mol/(m^2*s)]
      typeGUIControl = volumetric
      mixtureSolvent = 1
      Dgas = 10^-5[m^2/s]
      Dliquid = 10^-8[m^2/s]
      kgas = 0.015[W/(m*K)]
      MolarMassSelection = Thermodynamics
      M = 17.00738[g/mol]
      liquidDensitySel = Thermodynamics
      rho = 1000[kg/m^3]
      LiquidThermalConductivitySel = Thermodynamics
    H2O: SpeciesChem "Species: H2O"
      sisDef = 1
      sType = volumetric
      sSequenceNo = 6
      SpeciesSource = Reaction
      specLabel = H2O
      Tlo = 300[K]
      Tmid = 1000[K]
      Thi = 5000[K]
      h = R_const*((re.T<=re.Tlo_H2O)*(re.aLo6_H2O+re.Tlo_H2O*(re.aLo1_H2O+0.5*re.Tlo_H2O*(re.aLo2_H2O+2*re.Tlo_H2O*(re.aLo3_H2O+0.75*re.Tlo_H2O*(re.aLo4_H2O+0.8*re.Tlo_H2O*re.aLo5_H2O))/3)))+(re.T>re.Tlo_H2O)*(re.T<=re.Tmid_H2O)*(re.aLo6_H2O+re.T*(re.aLo1_H2O+0.5*re.T*(re.aLo2_H2O+2*re.T*(re.aLo3_H2O+0.75*re.T*(re.aLo4_H2O+0.8*re.T*re.aLo5_H2O))/3)))+(re.T>re.Tmid_H2O)*(re.T<=re.Thi_H2O)*(re.aHi6_H2O+re.T*(re.aHi1_H2O+0.5*re.T*(re.aHi2_H2O+2*re.T*(re.aHi3_H2O+0.75*re.T*(re.aHi4_H2O+0.8*re.T*re.aHi5_H2O))/3)))+(re.T>re.Thi_H2O)*(re.aHi6_H2O+re.Thi_H2O*(re.aHi1_H2O+0.5*re.Thi_H2O*(re.aHi2_H2O+2*re.Thi_H2O*(re.aHi3_H2O+0.75*re.Thi_H2O*(re.aHi4_H2O+0.8*re.Thi_H2O*re.aHi5_H2O))/3))))
      s = R_const*((re.T<=re.Tlo_H2O)*(re.aLo7_H2O+re.aLo1_H2O*log(re.T/1[K])+re.Tlo_H2O*(re.aLo2_H2O+0.5*re.Tlo_H2O*(re.aLo3_H2O+2*re.Tlo_H2O*(re.aLo4_H2O+0.75*re.Tlo_H2O*re.aLo5_H2O)/3)))+(re.T>re.Tlo_H2O)*(re.T<=re.Tmid_H2O)*(re.aLo7_H2O+re.aLo1_H2O*log(re.T/1[K])+re.T*(re.aLo2_H2O+0.5*re.T*(re.aLo3_H2O+2*re.T*(re.aLo4_H2O+0.75*re.T*re.aLo5_H2O)/3)))+(re.T>re.Tmid_H2O)*(re.T<=re.Thi_H2O)*(re.aHi7_H2O+re.aHi1_H2O*log(re.T/1[K])+re.T*(re.aHi2_H2O+0.5*re.T*(re.aHi3_H2O+2*re.T*(re.aHi4_H2O+0.75*re.T*re.aHi5_H2O)/3)))+(re.T>re.Thi_H2O)*(re.aHi7_H2O+re.aHi1_H2O*log(re.T/1[K])+re.Thi_H2O*(re.aHi2_H2O+0.5*re.Thi_H2O*(re.aHi3_H2O+2*re.Thi_H2O*(re.aHi4_H2O+0.75*re.Thi_H2O*re.aHi5_H2O)/3))))
      Cp = R_const*((re.T<=re.Tlo_H2O)*(re.aLo1_H2O+re.Tlo_H2O*(re.aLo2_H2O+re.Tlo_H2O*(re.aLo3_H2O+re.Tlo_H2O*(re.aLo4_H2O+re.Tlo_H2O*re.aLo5_H2O))))+(re.T>re.Tlo_H2O)*(re.T<=re.Tmid_H2O)*(re.aLo1_H2O+re.T*(re.aLo2_H2O+re.T*(re.aLo3_H2O+re.T*(re.aLo4_H2O+re.T*re.aLo5_H2O))))+(re.T>re.Tmid_H2O)*(re.T<=re.Thi_H2O)*(re.aHi1_H2O+re.T*(re.aHi2_H2O+re.T*(re.aHi3_H2O+re.T*(re.aHi4_H2O+re.T*re.aHi5_H2O))))+(re.T>re.Thi_H2O)*(re.aHi1_H2O+re.Thi_H2O*(re.aHi2_H2O+re.Thi_H2O*(re.aHi3_H2O+re.Thi_H2O*(re.aHi4_H2O+re.Thi_H2O*re.aHi5_H2O)))))
      sigma = 3.458[angstrom]
      epsilonkb = 107.4[K]
      mu = 0[C*m]
      ActivityCoefficient = 1
      speciesEnthalpy = NASA
      ReactionTagInSpecies = {rch2, rch8, rch12, rch16, rch19, rch20, rch23}
      updatefeat = 1
      GasThermalConductivitySel = Automatic
      GasDiffusivitySel = Automatic
      LiquidDiffusivitySel = Automatic
      k = 0.02[W/(m*K)]
      De = 1e-5[m^2/s]
      SpeciesrateSelection = Automatic
      specName = H2O
      R = re.r_2+re.r_8+re.r_12+re.r_16+re.r_19+re.r_20+re.r_23
      Speciesrate = 0[mol/(m^3*s)]
      SpeciesrateSurf = 0[mol/(m^2*s)]
      Speciessurfacerate = 0[mol/(m^2*s)]
      typeGUIControl = volumetric
      mixtureSolvent = 1
      Dgas = 10^-5[m^2/s]
      Dliquid = 10^-8[m^2/s]
      kgas = 0.015[W/(m*K)]
      MolarMassSelection = Thermodynamics
      M = 18.01536[g/mol]
      liquidDensitySel = Thermodynamics
      rho = 1000[kg/m^3]
      LiquidThermalConductivitySel = Thermodynamics
    H2: SpeciesChem "Species: H2"
      sisDef = 1
      sType = volumetric
      sSequenceNo = 7
      SpeciesSource = Reaction
      specLabel = H2
      Tlo = 300[K]
      Tmid = 1000[K]
      Thi = 5000[K]
      h = R_const*((re.T<=re.Tlo_H2)*(re.aLo6_H2+re.Tlo_H2*(re.aLo1_H2+0.5*re.Tlo_H2*(re.aLo2_H2+2*re.Tlo_H2*(re.aLo3_H2+0.75*re.Tlo_H2*(re.aLo4_H2+0.8*re.Tlo_H2*re.aLo5_H2))/3)))+(re.T>re.Tlo_H2)*(re.T<=re.Tmid_H2)*(re.aLo6_H2+re.T*(re.aLo1_H2+0.5*re.T*(re.aLo2_H2+2*re.T*(re.aLo3_H2+0.75*re.T*(re.aLo4_H2+0.8*re.T*re.aLo5_H2))/3)))+(re.T>re.Tmid_H2)*(re.T<=re.Thi_H2)*(re.aHi6_H2+re.T*(re.aHi1_H2+0.5*re.T*(re.aHi2_H2+2*re.T*(re.aHi3_H2+0.75*re.T*(re.aHi4_H2+0.8*re.T*re.aHi5_H2))/3)))+(re.T>re.Thi_H2)*(re.aHi6_H2+re.Thi_H2*(re.aHi1_H2+0.5*re.Thi_H2*(re.aHi2_H2+2*re.Thi_H2*(re.aHi3_H2+0.75*re.Thi_H2*(re.aHi4_H2+0.8*re.Thi_H2*re.aHi5_H2))/3))))
      s = R_const*((re.T<=re.Tlo_H2)*(re.aLo7_H2+re.aLo1_H2*log(re.T/1[K])+re.Tlo_H2*(re.aLo2_H2+0.5*re.Tlo_H2*(re.aLo3_H2+2*re.Tlo_H2*(re.aLo4_H2+0.75*re.Tlo_H2*re.aLo5_H2)/3)))+(re.T>re.Tlo_H2)*(re.T<=re.Tmid_H2)*(re.aLo7_H2+re.aLo1_H2*log(re.T/1[K])+re.T*(re.aLo2_H2+0.5*re.T*(re.aLo3_H2+2*re.T*(re.aLo4_H2+0.75*re.T*re.aLo5_H2)/3)))+(re.T>re.Tmid_H2)*(re.T<=re.Thi_H2)*(re.aHi7_H2+re.aHi1_H2*log(re.T/1[K])+re.T*(re.aHi2_H2+0.5*re.T*(re.aHi3_H2+2*re.T*(re.aHi4_H2+0.75*re.T*re.aHi5_H2)/3)))+(re.T>re.Thi_H2)*(re.aHi7_H2+re.aHi1_H2*log(re.T/1[K])+re.Thi_H2*(re.aHi2_H2+0.5*re.Thi_H2*(re.aHi3_H2+2*re.Thi_H2*(re.aHi4_H2+0.75*re.Thi_H2*re.aHi5_H2)/3))))
      Cp = R_const*((re.T<=re.Tlo_H2)*(re.aLo1_H2+re.Tlo_H2*(re.aLo2_H2+re.Tlo_H2*(re.aLo3_H2+re.Tlo_H2*(re.aLo4_H2+re.Tlo_H2*re.aLo5_H2))))+(re.T>re.Tlo_H2)*(re.T<=re.Tmid_H2)*(re.aLo1_H2+re.T*(re.aLo2_H2+re.T*(re.aLo3_H2+re.T*(re.aLo4_H2+re.T*re.aLo5_H2))))+(re.T>re.Tmid_H2)*(re.T<=re.Thi_H2)*(re.aHi1_H2+re.T*(re.aHi2_H2+re.T*(re.aHi3_H2+re.T*(re.aHi4_H2+re.T*re.aHi5_H2))))+(re.T>re.Thi_H2)*(re.aHi1_H2+re.Thi_H2*(re.aHi2_H2+re.Thi_H2*(re.aHi3_H2+re.Thi_H2*(re.aHi4_H2+re.Thi_H2*re.aHi5_H2)))))
      sigma = 3.458[angstrom]
      epsilonkb = 107.4[K]
      mu = 0[C*m]
      ActivityCoefficient = 1
      speciesEnthalpy = NASA
      ReactionTagInSpecies = {rch3, rch9, rch13, rch16, rch17}
      updatefeat = 1
      GasThermalConductivitySel = Automatic
      GasDiffusivitySel = Automatic
      LiquidDiffusivitySel = Automatic
      k = 0.02[W/(m*K)]
      De = 1e-5[m^2/s]
      SpeciesrateSelection = Automatic
      specName = H2
      R = re.r_3+re.r_9+re.r_13-re.r_16-re.r_17
      Speciesrate = 0[mol/(m^3*s)]
      SpeciesrateSurf = 0[mol/(m^2*s)]
      Speciessurfacerate = 0[mol/(m^2*s)]
      typeGUIControl = volumetric
      mixtureSolvent = 1
      Dgas = 10^-5[m^2/s]
      Dliquid = 10^-8[m^2/s]
      kgas = 0.015[W/(m*K)]
      MolarMassSelection = Thermodynamics
      M = 2.01596[g/mol]
      liquidDensitySel = Thermodynamics
      rho = 1000[kg/m^3]
      LiquidThermalConductivitySel = Thermodynamics
    O: SpeciesChem "Species: O"
      sisDef = 1
      sType = volumetric
      sSequenceNo = 8
      SpeciesSource = Reaction
      specLabel = O
      Tlo = 300[K]
      Tmid = 1000[K]
      Thi = 5000[K]
      h = R_const*((re.T<=re.Tlo_O)*(re.aLo6_O+re.Tlo_O*(re.aLo1_O+0.5*re.Tlo_O*(re.aLo2_O+2*re.Tlo_O*(re.aLo3_O+0.75*re.Tlo_O*(re.aLo4_O+0.8*re.Tlo_O*re.aLo5_O))/3)))+(re.T>re.Tlo_O)*(re.T<=re.Tmid_O)*(re.aLo6_O+re.T*(re.aLo1_O+0.5*re.T*(re.aLo2_O+2*re.T*(re.aLo3_O+0.75*re.T*(re.aLo4_O+0.8*re.T*re.aLo5_O))/3)))+(re.T>re.Tmid_O)*(re.T<=re.Thi_O)*(re.aHi6_O+re.T*(re.aHi1_O+0.5*re.T*(re.aHi2_O+2*re.T*(re.aHi3_O+0.75*re.T*(re.aHi4_O+0.8*re.T*re.aHi5_O))/3)))+(re.T>re.Thi_O)*(re.aHi6_O+re.Thi_O*(re.aHi1_O+0.5*re.Thi_O*(re.aHi2_O+2*re.Thi_O*(re.aHi3_O+0.75*re.Thi_O*(re.aHi4_O+0.8*re.Thi_O*re.aHi5_O))/3))))
      s = R_const*((re.T<=re.Tlo_O)*(re.aLo7_O+re.aLo1_O*log(re.T/1[K])+re.Tlo_O*(re.aLo2_O+0.5*re.Tlo_O*(re.aLo3_O+2*re.Tlo_O*(re.aLo4_O+0.75*re.Tlo_O*re.aLo5_O)/3)))+(re.T>re.Tlo_O)*(re.T<=re.Tmid_O)*(re.aLo7_O+re.aLo1_O*log(re.T/1[K])+re.T*(re.aLo2_O+0.5*re.T*(re.aLo3_O+2*re.T*(re.aLo4_O+0.75*re.T*re.aLo5_O)/3)))+(re.T>re.Tmid_O)*(re.T<=re.Thi_O)*(re.aHi7_O+re.aHi1_O*log(re.T/1[K])+re.T*(re.aHi2_O+0.5*re.T*(re.aHi3_O+2*re.T*(re.aHi4_O+0.75*re.T*re.aHi5_O)/3)))+(re.T>re.Thi_O)*(re.aHi7_O+re.aHi1_O*log(re.T/1[K])+re.Thi_O*(re.aHi2_O+0.5*re.Thi_O*(re.aHi3_O+2*re.Thi_O*(re.aHi4_O+0.75*re.Thi_O*re.aHi5_O)/3))))
      Cp = R_const*((re.T<=re.Tlo_O)*(re.aLo1_O+re.Tlo_O*(re.aLo2_O+re.Tlo_O*(re.aLo3_O+re.Tlo_O*(re.aLo4_O+re.Tlo_O*re.aLo5_O))))+(re.T>re.Tlo_O)*(re.T<=re.Tmid_O)*(re.aLo1_O+re.T*(re.aLo2_O+re.T*(re.aLo3_O+re.T*(re.aLo4_O+re.T*re.aLo5_O))))+(re.T>re.Tmid_O)*(re.T<=re.Thi_O)*(re.aHi1_O+re.T*(re.aHi2_O+re.T*(re.aHi3_O+re.T*(re.aHi4_O+re.T*re.aHi5_O))))+(re.T>re.Thi_O)*(re.aHi1_O+re.Thi_O*(re.aHi2_O+re.Thi_O*(re.aHi3_O+re.Thi_O*(re.aHi4_O+re.Thi_O*re.aHi5_O)))))
      sigma = 3.458[angstrom]
      epsilonkb = 107.4[K]
      mu = 0[C*m]
      ActivityCoefficient = 1
      speciesEnthalpy = NASA
      ReactionTagInSpecies = {rch4, rch5, rch7, rch11, rch17, rch18, rch23}
      updatefeat = 1
      GasThermalConductivitySel = Automatic
      GasDiffusivitySel = Automatic
      LiquidDiffusivitySel = Automatic
      k = 0.02[W/(m*K)]
      De = 1e-5[m^2/s]
      SpeciesrateSelection = Automatic
      specName = O
      R = -re.r_4-re.r_5-re.r_7-re.r_11-re.r_17+re.r_18+re.r_23
      Speciesrate = 0[mol/(m^3*s)]
      SpeciesrateSurf = 0[mol/(m^2*s)]
      Speciessurfacerate = 0[mol/(m^2*s)]
      typeGUIControl = volumetric
      mixtureSolvent = 1
      Dgas = 10^-5[m^2/s]
      Dliquid = 10^-8[m^2/s]
      kgas = 0.015[W/(m*K)]
      MolarMassSelection = Thermodynamics
      M = 15.9994[g/mol]
      liquidDensitySel = Thermodynamics
      rho = 1000[kg/m^3]
      LiquidThermalConductivitySel = Thermodynamics
    CH2O: SpeciesChem "Species: CH2O"
      sisDef = 1
      sType = volumetric
      sSequenceNo = 9
      SpeciesSource = Reaction
      specLabel = CH2O
      Tlo = 300[K]
      Tmid = 1000[K]
      Thi = 5000[K]
      h = R_const*((re.T<=re.Tlo_CH2O)*(re.aLo6_CH2O+re.Tlo_CH2O*(re.aLo1_CH2O+0.5*re.Tlo_CH2O*(re.aLo2_CH2O+2*re.Tlo_CH2O*(re.aLo3_CH2O+0.75*re.Tlo_CH2O*(re.aLo4_CH2O+0.8*re.Tlo_CH2O*re.aLo5_CH2O))/3)))+(re.T>re.Tlo_CH2O)*(re.T<=re.Tmid_CH2O)*(re.aLo6_CH2O+re.T*(re.aLo1_CH2O+0.5*re.T*(re.aLo2_CH2O+2*re.T*(re.aLo3_CH2O+0.75*re.T*(re.aLo4_CH2O+0.8*re.T*re.aLo5_CH2O))/3)))+(re.T>re.Tmid_CH2O)*(re.T<=re.Thi_CH2O)*(re.aHi6_CH2O+re.T*(re.aHi1_CH2O+0.5*re.T*(re.aHi2_CH2O+2*re.T*(re.aHi3_CH2O+0.75*re.T*(re.aHi4_CH2O+0.8*re.T*re.aHi5_CH2O))/3)))+(re.T>re.Thi_CH2O)*(re.aHi6_CH2O+re.Thi_CH2O*(re.aHi1_CH2O+0.5*re.Thi_CH2O*(re.aHi2_CH2O+2*re.Thi_CH2O*(re.aHi3_CH2O+0.75*re.Thi_CH2O*(re.aHi4_CH2O+0.8*re.Thi_CH2O*re.aHi5_CH2O))/3))))
      s = R_const*((re.T<=re.Tlo_CH2O)*(re.aLo7_CH2O+re.aLo1_CH2O*log(re.T/1[K])+re.Tlo_CH2O*(re.aLo2_CH2O+0.5*re.Tlo_CH2O*(re.aLo3_CH2O+2*re.Tlo_CH2O*(re.aLo4_CH2O+0.75*re.Tlo_CH2O*re.aLo5_CH2O)/3)))+(re.T>re.Tlo_CH2O)*(re.T<=re.Tmid_CH2O)*(re.aLo7_CH2O+re.aLo1_CH2O*log(re.T/1[K])+re.T*(re.aLo2_CH2O+0.5*re.T*(re.aLo3_CH2O+2*re.T*(re.aLo4_CH2O+0.75*re.T*re.aLo5_CH2O)/3)))+(re.T>re.Tmid_CH2O)*(re.T<=re.Thi_CH2O)*(re.aHi7_CH2O+re.aHi1_CH2O*log(re.T/1[K])+re.T*(re.aHi2_CH2O+0.5*re.T*(re.aHi3_CH2O+2*re.T*(re.aHi4_CH2O+0.75*re.T*re.aHi5_CH2O)/3)))+(re.T>re.Thi_CH2O)*(re.aHi7_CH2O+re.aHi1_CH2O*log(re.T/1[K])+re.Thi_CH2O*(re.aHi2_CH2O+0.5*re.Thi_CH2O*(re.aHi3_CH2O+2*re.Thi_CH2O*(re.aHi4_CH2O+0.75*re.Thi_CH2O*re.aHi5_CH2O)/3))))
      Cp = R_const*((re.T<=re.Tlo_CH2O)*(re.aLo1_CH2O+re.Tlo_CH2O*(re.aLo2_CH2O+re.Tlo_CH2O*(re.aLo3_CH2O+re.Tlo_CH2O*(re.aLo4_CH2O+re.Tlo_CH2O*re.aLo5_CH2O))))+(re.T>re.Tlo_CH2O)*(re.T<=re.Tmid_CH2O)*(re.aLo1_CH2O+re.T*(re.aLo2_CH2O+re.T*(re.aLo3_CH2O+re.T*(re.aLo4_CH2O+re.T*re.aLo5_CH2O))))+(re.T>re.Tmid_CH2O)*(re.T<=re.Thi_CH2O)*(re.aHi1_CH2O+re.T*(re.aHi2_CH2O+re.T*(re.aHi3_CH2O+re.T*(re.aHi4_CH2O+re.T*re.aHi5_CH2O))))+(re.T>re.Thi_CH2O)*(re.aHi1_CH2O+re.Thi_CH2O*(re.aHi2_CH2O+re.Thi_CH2O*(re.aHi3_CH2O+re.Thi_CH2O*(re.aHi4_CH2O+re.Thi_CH2O*re.aHi5_CH2O)))))
      sigma = 3.458[angstrom]
      epsilonkb = 107.4[K]
      mu = 0[C*m]
      ActivityCoefficient = 1
      speciesEnthalpy = NASA
      ReactionTagInSpecies = {rch5, rch6, rch7, rch8, rch9, rch10}
      updatefeat = 1
      GasThermalConductivitySel = Automatic
      GasDiffusivitySel = Automatic
      LiquidDiffusivitySel = Automatic
      k = 0.02[W/(m*K)]
      De = 1e-5[m^2/s]
      SpeciesrateSelection = Automatic
      specName = CH2O
      R = re.r_5+re.r_6-re.r_7-re.r_8-re.r_9-re.r_10
      Speciesrate = 0[mol/(m^3*s)]
      SpeciesrateSurf = 0[mol/(m^2*s)]
      Speciessurfacerate = 0[mol/(m^2*s)]
      typeGUIControl = volumetric
      mixtureSolvent = 1
      Dgas = 10^-5[m^2/s]
      Dliquid = 10^-8[m^2/s]
      kgas = 0.015[W/(m*K)]
      MolarMassSelection = Thermodynamics
      M = 30.02596[g/mol]
      liquidDensitySel = Thermodynamics
      rho = 1000[kg/m^3]
      LiquidThermalConductivitySel = Thermodynamics
    O2: SpeciesChem "Species: O2"
      sisDef = 1
      sType = volumetric
      sSequenceNo = 10
      SpeciesSource = Reaction
      specLabel = O2
      Tlo = 300[K]
      Tmid = 1000[K]
      Thi = 5000[K]
      h = R_const*((re.T<=re.Tlo_O2)*(re.aLo6_O2+re.Tlo_O2*(re.aLo1_O2+0.5*re.Tlo_O2*(re.aLo2_O2+2*re.Tlo_O2*(re.aLo3_O2+0.75*re.Tlo_O2*(re.aLo4_O2+0.8*re.Tlo_O2*re.aLo5_O2))/3)))+(re.T>re.Tlo_O2)*(re.T<=re.Tmid_O2)*(re.aLo6_O2+re.T*(re.aLo1_O2+0.5*re.T*(re.aLo2_O2+2*re.T*(re.aLo3_O2+0.75*re.T*(re.aLo4_O2+0.8*re.T*re.aLo5_O2))/3)))+(re.T>re.Tmid_O2)*(re.T<=re.Thi_O2)*(re.aHi6_O2+re.T*(re.aHi1_O2+0.5*re.T*(re.aHi2_O2+2*re.T*(re.aHi3_O2+0.75*re.T*(re.aHi4_O2+0.8*re.T*re.aHi5_O2))/3)))+(re.T>re.Thi_O2)*(re.aHi6_O2+re.Thi_O2*(re.aHi1_O2+0.5*re.Thi_O2*(re.aHi2_O2+2*re.Thi_O2*(re.aHi3_O2+0.75*re.Thi_O2*(re.aHi4_O2+0.8*re.Thi_O2*re.aHi5_O2))/3))))
      s = R_const*((re.T<=re.Tlo_O2)*(re.aLo7_O2+re.aLo1_O2*log(re.T/1[K])+re.Tlo_O2*(re.aLo2_O2+0.5*re.Tlo_O2*(re.aLo3_O2+2*re.Tlo_O2*(re.aLo4_O2+0.75*re.Tlo_O2*re.aLo5_O2)/3)))+(re.T>re.Tlo_O2)*(re.T<=re.Tmid_O2)*(re.aLo7_O2+re.aLo1_O2*log(re.T/1[K])+re.T*(re.aLo2_O2+0.5*re.T*(re.aLo3_O2+2*re.T*(re.aLo4_O2+0.75*re.T*re.aLo5_O2)/3)))+(re.T>re.Tmid_O2)*(re.T<=re.Thi_O2)*(re.aHi7_O2+re.aHi1_O2*log(re.T/1[K])+re.T*(re.aHi2_O2+0.5*re.T*(re.aHi3_O2+2*re.T*(re.aHi4_O2+0.75*re.T*re.aHi5_O2)/3)))+(re.T>re.Thi_O2)*(re.aHi7_O2+re.aHi1_O2*log(re.T/1[K])+re.Thi_O2*(re.aHi2_O2+0.5*re.Thi_O2*(re.aHi3_O2+2*re.Thi_O2*(re.aHi4_O2+0.75*re.Thi_O2*re.aHi5_O2)/3))))
      Cp = R_const*((re.T<=re.Tlo_O2)*(re.aLo1_O2+re.Tlo_O2*(re.aLo2_O2+re.Tlo_O2*(re.aLo3_O2+re.Tlo_O2*(re.aLo4_O2+re.Tlo_O2*re.aLo5_O2))))+(re.T>re.Tlo_O2)*(re.T<=re.Tmid_O2)*(re.aLo1_O2+re.T*(re.aLo2_O2+re.T*(re.aLo3_O2+re.T*(re.aLo4_O2+re.T*re.aLo5_O2))))+(re.T>re.Tmid_O2)*(re.T<=re.Thi_O2)*(re.aHi1_O2+re.T*(re.aHi2_O2+re.T*(re.aHi3_O2+re.T*(re.aHi4_O2+re.T*re.aHi5_O2))))+(re.T>re.Thi_O2)*(re.aHi1_O2+re.Thi_O2*(re.aHi2_O2+re.Thi_O2*(re.aHi3_O2+re.Thi_O2*(re.aHi4_O2+re.Thi_O2*re.aHi5_O2)))))
      sigma = 3.458[angstrom]
      epsilonkb = 107.4[K]
      mu = 0[C*m]
      ActivityCoefficient = 1
      speciesEnthalpy = NASA
      ReactionTagInSpecies = {rch6, rch18, rch22}
      updatefeat = 1
      GasThermalConductivitySel = Automatic
      GasDiffusivitySel = Automatic
      LiquidDiffusivitySel = Automatic
      k = 0.02[W/(m*K)]
      De = 1e-5[m^2/s]
      SpeciesrateSelection = Automatic
      specName = O2
      R = -re.r_6-re.r_18-re.r_22
      Speciesrate = 0[mol/(m^3*s)]
      SpeciesrateSurf = 0[mol/(m^2*s)]
      Speciessurfacerate = 0[mol/(m^2*s)]
      typeGUIControl = volumetric
      mixtureSolvent = 1
      Dgas = 10^-5[m^2/s]
      Dliquid = 10^-8[m^2/s]
      kgas = 0.015[W/(m*K)]
      MolarMassSelection = Thermodynamics
      M = 31.9988[g/mol]
      liquidDensitySel = Thermodynamics
      rho = 1000[kg/m^3]
      LiquidThermalConductivitySel = Thermodynamics
    CHO: SpeciesChem "Species: CHO"
      sisDef = 1
      sType = volumetric
      sSequenceNo = 11
      SpeciesSource = Reaction
      specLabel = CHO
      Tlo = 300[K]
      Tmid = 1000[K]
      Thi = 5000[K]
      h = R_const*((re.T<=re.Tlo_CHO)*(re.aLo6_CHO+re.Tlo_CHO*(re.aLo1_CHO+0.5*re.Tlo_CHO*(re.aLo2_CHO+2*re.Tlo_CHO*(re.aLo3_CHO+0.75*re.Tlo_CHO*(re.aLo4_CHO+0.8*re.Tlo_CHO*re.aLo5_CHO))/3)))+(re.T>re.Tlo_CHO)*(re.T<=re.Tmid_CHO)*(re.aLo6_CHO+re.T*(re.aLo1_CHO+0.5*re.T*(re.aLo2_CHO+2*re.T*(re.aLo3_CHO+0.75*re.T*(re.aLo4_CHO+0.8*re.T*re.aLo5_CHO))/3)))+(re.T>re.Tmid_CHO)*(re.T<=re.Thi_CHO)*(re.aHi6_CHO+re.T*(re.aHi1_CHO+0.5*re.T*(re.aHi2_CHO+2*re.T*(re.aHi3_CHO+0.75*re.T*(re.aHi4_CHO+0.8*re.T*re.aHi5_CHO))/3)))+(re.T>re.Thi_CHO)*(re.aHi6_CHO+re.Thi_CHO*(re.aHi1_CHO+0.5*re.Thi_CHO*(re.aHi2_CHO+2*re.Thi_CHO*(re.aHi3_CHO+0.75*re.Thi_CHO*(re.aHi4_CHO+0.8*re.Thi_CHO*re.aHi5_CHO))/3))))
      s = R_const*((re.T<=re.Tlo_CHO)*(re.aLo7_CHO+re.aLo1_CHO*log(re.T/1[K])+re.Tlo_CHO*(re.aLo2_CHO+0.5*re.Tlo_CHO*(re.aLo3_CHO+2*re.Tlo_CHO*(re.aLo4_CHO+0.75*re.Tlo_CHO*re.aLo5_CHO)/3)))+(re.T>re.Tlo_CHO)*(re.T<=re.Tmid_CHO)*(re.aLo7_CHO+re.aLo1_CHO*log(re.T/1[K])+re.T*(re.aLo2_CHO+0.5*re.T*(re.aLo3_CHO+2*re.T*(re.aLo4_CHO+0.75*re.T*re.aLo5_CHO)/3)))+(re.T>re.Tmid_CHO)*(re.T<=re.Thi_CHO)*(re.aHi7_CHO+re.aHi1_CHO*log(re.T/1[K])+re.T*(re.aHi2_CHO+0.5*re.T*(re.aHi3_CHO+2*re.T*(re.aHi4_CHO+0.75*re.T*re.aHi5_CHO)/3)))+(re.T>re.Thi_CHO)*(re.aHi7_CHO+re.aHi1_CHO*log(re.T/1[K])+re.Thi_CHO*(re.aHi2_CHO+0.5*re.Thi_CHO*(re.aHi3_CHO+2*re.Thi_CHO*(re.aHi4_CHO+0.75*re.Thi_CHO*re.aHi5_CHO)/3))))
      Cp = R_const*((re.T<=re.Tlo_CHO)*(re.aLo1_CHO+re.Tlo_CHO*(re.aLo2_CHO+re.Tlo_CHO*(re.aLo3_CHO+re.Tlo_CHO*(re.aLo4_CHO+re.Tlo_CHO*re.aLo5_CHO))))+(re.T>re.Tlo_CHO)*(re.T<=re.Tmid_CHO)*(re.aLo1_CHO+re.T*(re.aLo2_CHO+re.T*(re.aLo3_CHO+re.T*(re.aLo4_CHO+re.T*re.aLo5_CHO))))+(re.T>re.Tmid_CHO)*(re.T<=re.Thi_CHO)*(re.aHi1_CHO+re.T*(re.aHi2_CHO+re.T*(re.aHi3_CHO+re.T*(re.aHi4_CHO+re.T*re.aHi5_CHO))))+(re.T>re.Thi_CHO)*(re.aHi1_CHO+re.Thi_CHO*(re.aHi2_CHO+re.Thi_CHO*(re.aHi3_CHO+re.Thi_CHO*(re.aHi4_CHO+re.Thi_CHO*re.aHi5_CHO)))))
      sigma = 3.458[angstrom]
      epsilonkb = 107.4[K]
      mu = 0[C*m]
      ActivityCoefficient = 1
      speciesEnthalpy = NASA
      ReactionTagInSpecies = {rch7, rch8, rch9, rch10, rch11, rch12, rch13, rch14}
      updatefeat = 1
      GasThermalConductivitySel = Automatic
      GasDiffusivitySel = Automatic
      LiquidDiffusivitySel = Automatic
      k = 0.02[W/(m*K)]
      De = 1e-5[m^2/s]
      SpeciesrateSelection = Automatic
      specName = CHO
      R = re.r_7+re.r_8+re.r_9+re.r_10-re.r_11-re.r_12-re.r_13-re.r_14
      Speciesrate = 0[mol/(m^3*s)]
      SpeciesrateSurf = 0[mol/(m^2*s)]
      Speciessurfacerate = 0[mol/(m^2*s)]
      typeGUIControl = volumetric
      mixtureSolvent = 1
      Dgas = 10^-5[m^2/s]
      Dliquid = 10^-8[m^2/s]
      kgas = 0.015[W/(m*K)]
      MolarMassSelection = Thermodynamics
      M = 29.01798[g/mol]
      liquidDensitySel = Thermodynamics
      rho = 1000[kg/m^3]
      LiquidThermalConductivitySel = Thermodynamics
    CO: SpeciesChem "Species: CO"
      sisDef = 1
      sType = volumetric
      sSequenceNo = 12
      SpeciesSource = Reaction
      specLabel = CO
      Tlo = 300[K]
      Tmid = 1000[K]
      Thi = 5000[K]
      h = R_const*((re.T<=re.Tlo_CO)*(re.aLo6_CO+re.Tlo_CO*(re.aLo1_CO+0.5*re.Tlo_CO*(re.aLo2_CO+2*re.Tlo_CO*(re.aLo3_CO+0.75*re.Tlo_CO*(re.aLo4_CO+0.8*re.Tlo_CO*re.aLo5_CO))/3)))+(re.T>re.Tlo_CO)*(re.T<=re.Tmid_CO)*(re.aLo6_CO+re.T*(re.aLo1_CO+0.5*re.T*(re.aLo2_CO+2*re.T*(re.aLo3_CO+0.75*re.T*(re.aLo4_CO+0.8*re.T*re.aLo5_CO))/3)))+(re.T>re.Tmid_CO)*(re.T<=re.Thi_CO)*(re.aHi6_CO+re.T*(re.aHi1_CO+0.5*re.T*(re.aHi2_CO+2*re.T*(re.aHi3_CO+0.75*re.T*(re.aHi4_CO+0.8*re.T*re.aHi5_CO))/3)))+(re.T>re.Thi_CO)*(re.aHi6_CO+re.Thi_CO*(re.aHi1_CO+0.5*re.Thi_CO*(re.aHi2_CO+2*re.Thi_CO*(re.aHi3_CO+0.75*re.Thi_CO*(re.aHi4_CO+0.8*re.Thi_CO*re.aHi5_CO))/3))))
      s = R_const*((re.T<=re.Tlo_CO)*(re.aLo7_CO+re.aLo1_CO*log(re.T/1[K])+re.Tlo_CO*(re.aLo2_CO+0.5*re.Tlo_CO*(re.aLo3_CO+2*re.Tlo_CO*(re.aLo4_CO+0.75*re.Tlo_CO*re.aLo5_CO)/3)))+(re.T>re.Tlo_CO)*(re.T<=re.Tmid_CO)*(re.aLo7_CO+re.aLo1_CO*log(re.T/1[K])+re.T*(re.aLo2_CO+0.5*re.T*(re.aLo3_CO+2*re.T*(re.aLo4_CO+0.75*re.T*re.aLo5_CO)/3)))+(re.T>re.Tmid_CO)*(re.T<=re.Thi_CO)*(re.aHi7_CO+re.aHi1_CO*log(re.T/1[K])+re.T*(re.aHi2_CO+0.5*re.T*(re.aHi3_CO+2*re.T*(re.aHi4_CO+0.75*re.T*re.aHi5_CO)/3)))+(re.T>re.Thi_CO)*(re.aHi7_CO+re.aHi1_CO*log(re.T/1[K])+re.Thi_CO*(re.aHi2_CO+0.5*re.Thi_CO*(re.aHi3_CO+2*re.Thi_CO*(re.aHi4_CO+0.75*re.Thi_CO*re.aHi5_CO)/3))))
      Cp = R_const*((re.T<=re.Tlo_CO)*(re.aLo1_CO+re.Tlo_CO*(re.aLo2_CO+re.Tlo_CO*(re.aLo3_CO+re.Tlo_CO*(re.aLo4_CO+re.Tlo_CO*re.aLo5_CO))))+(re.T>re.Tlo_CO)*(re.T<=re.Tmid_CO)*(re.aLo1_CO+re.T*(re.aLo2_CO+re.T*(re.aLo3_CO+re.T*(re.aLo4_CO+re.T*re.aLo5_CO))))+(re.T>re.Tmid_CO)*(re.T<=re.Thi_CO)*(re.aHi1_CO+re.T*(re.aHi2_CO+re.T*(re.aHi3_CO+re.T*(re.aHi4_CO+re.T*re.aHi5_CO))))+(re.T>re.Thi_CO)*(re.aHi1_CO+re.Thi_CO*(re.aHi2_CO+re.Thi_CO*(re.aHi3_CO+re.Thi_CO*(re.aHi4_CO+re.Thi_CO*re.aHi5_CO)))))
      sigma = 3.458[angstrom]
      epsilonkb = 107.4[K]
      mu = 0[C*m]
      ActivityCoefficient = 1
      speciesEnthalpy = NASA
      ReactionTagInSpecies = {rch11, rch12, rch13, rch14, rch15}
      updatefeat = 1
      GasThermalConductivitySel = Automatic
      GasDiffusivitySel = Automatic
      LiquidDiffusivitySel = Automatic
      k = 0.02[W/(m*K)]
      De = 1e-5[m^2/s]
      SpeciesrateSelection = Automatic
      specName = CO
      R = re.r_11+re.r_12+re.r_13+re.r_14-re.r_15
      Speciesrate = 0[mol/(m^3*s)]
      SpeciesrateSurf = 0[mol/(m^2*s)]
      Speciessurfacerate = 0[mol/(m^2*s)]
      typeGUIControl = volumetric
      mixtureSolvent = 1
      Dgas = 10^-5[m^2/s]
      Dliquid = 10^-8[m^2/s]
      kgas = 0.015[W/(m*K)]
      MolarMassSelection = Thermodynamics
      M = 28.01[g/mol]
      liquidDensitySel = Thermodynamics
      rho = 1000[kg/m^3]
      LiquidThermalConductivitySel = Thermodynamics
    CO2: SpeciesChem "Species: CO2"
      sisDef = 1
      sType = volumetric
      sSequenceNo = 13
      SpeciesSource = Reaction
      specLabel = CO2
      Tlo = 300[K]
      Tmid = 1000[K]
      Thi = 5000[K]
      h = R_const*((re.T<=re.Tlo_CO2)*(re.aLo6_CO2+re.Tlo_CO2*(re.aLo1_CO2+0.5*re.Tlo_CO2*(re.aLo2_CO2+2*re.Tlo_CO2*(re.aLo3_CO2+0.75*re.Tlo_CO2*(re.aLo4_CO2+0.8*re.Tlo_CO2*re.aLo5_CO2))/3)))+(re.T>re.Tlo_CO2)*(re.T<=re.Tmid_CO2)*(re.aLo6_CO2+re.T*(re.aLo1_CO2+0.5*re.T*(re.aLo2_CO2+2*re.T*(re.aLo3_CO2+0.75*re.T*(re.aLo4_CO2+0.8*re.T*re.aLo5_CO2))/3)))+(re.T>re.Tmid_CO2)*(re.T<=re.Thi_CO2)*(re.aHi6_CO2+re.T*(re.aHi1_CO2+0.5*re.T*(re.aHi2_CO2+2*re.T*(re.aHi3_CO2+0.75*re.T*(re.aHi4_CO2+0.8*re.T*re.aHi5_CO2))/3)))+(re.T>re.Thi_CO2)*(re.aHi6_CO2+re.Thi_CO2*(re.aHi1_CO2+0.5*re.Thi_CO2*(re.aHi2_CO2+2*re.Thi_CO2*(re.aHi3_CO2+0.75*re.Thi_CO2*(re.aHi4_CO2+0.8*re.Thi_CO2*re.aHi5_CO2))/3))))
      s = R_const*((re.T<=re.Tlo_CO2)*(re.aLo7_CO2+re.aLo1_CO2*log(re.T/1[K])+re.Tlo_CO2*(re.aLo2_CO2+0.5*re.Tlo_CO2*(re.aLo3_CO2+2*re.Tlo_CO2*(re.aLo4_CO2+0.75*re.Tlo_CO2*re.aLo5_CO2)/3)))+(re.T>re.Tlo_CO2)*(re.T<=re.Tmid_CO2)*(re.aLo7_CO2+re.aLo1_CO2*log(re.T/1[K])+re.T*(re.aLo2_CO2+0.5*re.T*(re.aLo3_CO2+2*re.T*(re.aLo4_CO2+0.75*re.T*re.aLo5_CO2)/3)))+(re.T>re.Tmid_CO2)*(re.T<=re.Thi_CO2)*(re.aHi7_CO2+re.aHi1_CO2*log(re.T/1[K])+re.T*(re.aHi2_CO2+0.5*re.T*(re.aHi3_CO2+2*re.T*(re.aHi4_CO2+0.75*re.T*re.aHi5_CO2)/3)))+(re.T>re.Thi_CO2)*(re.aHi7_CO2+re.aHi1_CO2*log(re.T/1[K])+re.Thi_CO2*(re.aHi2_CO2+0.5*re.Thi_CO2*(re.aHi3_CO2+2*re.Thi_CO2*(re.aHi4_CO2+0.75*re.Thi_CO2*re.aHi5_CO2)/3))))
      Cp = R_const*((re.T<=re.Tlo_CO2)*(re.aLo1_CO2+re.Tlo_CO2*(re.aLo2_CO2+re.Tlo_CO2*(re.aLo3_CO2+re.Tlo_CO2*(re.aLo4_CO2+re.Tlo_CO2*re.aLo5_CO2))))+(re.T>re.Tlo_CO2)*(re.T<=re.Tmid_CO2)*(re.aLo1_CO2+re.T*(re.aLo2_CO2+re.T*(re.aLo3_CO2+re.T*(re.aLo4_CO2+re.T*re.aLo5_CO2))))+(re.T>re.Tmid_CO2)*(re.T<=re.Thi_CO2)*(re.aHi1_CO2+re.T*(re.aHi2_CO2+re.T*(re.aHi3_CO2+re.T*(re.aHi4_CO2+re.T*re.aHi5_CO2))))+(re.T>re.Thi_CO2)*(re.aHi1_CO2+re.Thi_CO2*(re.aHi2_CO2+re.Thi_CO2*(re.aHi3_CO2+re.Thi_CO2*(re.aHi4_CO2+re.Thi_CO2*re.aHi5_CO2)))))
      sigma = 3.458[angstrom]
      epsilonkb = 107.4[K]
      mu = 0[C*m]
      ActivityCoefficient = 1
      speciesEnthalpy = NASA
      ReactionTagInSpecies = rch15
      updatefeat = 1
      GasThermalConductivitySel = Automatic
      GasDiffusivitySel = Automatic
      LiquidDiffusivitySel = Automatic
      k = 0.02[W/(m*K)]
      De = 1e-5[m^2/s]
      SpeciesrateSelection = Automatic
      specName = CO2
      R = re.r_15
      Speciesrate = 0[mol/(m^3*s)]
      SpeciesrateSurf = 0[mol/(m^2*s)]
      Speciessurfacerate = 0[mol/(m^2*s)]
      typeGUIControl = volumetric
      mixtureSolvent = 1
      Dgas = 10^-5[m^2/s]
      Dliquid = 10^-8[m^2/s]
      kgas = 0.015[W/(m*K)]
      MolarMassSelection = Thermodynamics
      M = 44.0094[g/mol]
      liquidDensitySel = Thermodynamics
      rho = 1000[kg/m^3]
      LiquidThermalConductivitySel = Thermodynamics
    Ar: SpeciesChem "Species: Ar"
      sisDef = 1
      sType = volumetric
      sSequenceNo = 14
      SpeciesSource = Reaction
      specLabel = Ar
      Tlo = 300[K]
      Tmid = 1000[K]
      Thi = 5000[K]
      h = R_const*((re.T<=re.Tlo_Ar)*(re.aLo6_Ar+re.Tlo_Ar*(re.aLo1_Ar+0.5*re.Tlo_Ar*(re.aLo2_Ar+2*re.Tlo_Ar*(re.aLo3_Ar+0.75*re.Tlo_Ar*(re.aLo4_Ar+0.8*re.Tlo_Ar*re.aLo5_Ar))/3)))+(re.T>re.Tlo_Ar)*(re.T<=re.Tmid_Ar)*(re.aLo6_Ar+re.T*(re.aLo1_Ar+0.5*re.T*(re.aLo2_Ar+2*re.T*(re.aLo3_Ar+0.75*re.T*(re.aLo4_Ar+0.8*re.T*re.aLo5_Ar))/3)))+(re.T>re.Tmid_Ar)*(re.T<=re.Thi_Ar)*(re.aHi6_Ar+re.T*(re.aHi1_Ar+0.5*re.T*(re.aHi2_Ar+2*re.T*(re.aHi3_Ar+0.75*re.T*(re.aHi4_Ar+0.8*re.T*re.aHi5_Ar))/3)))+(re.T>re.Thi_Ar)*(re.aHi6_Ar+re.Thi_Ar*(re.aHi1_Ar+0.5*re.Thi_Ar*(re.aHi2_Ar+2*re.Thi_Ar*(re.aHi3_Ar+0.75*re.Thi_Ar*(re.aHi4_Ar+0.8*re.Thi_Ar*re.aHi5_Ar))/3))))
      s = R_const*((re.T<=re.Tlo_Ar)*(re.aLo7_Ar+re.aLo1_Ar*log(re.T/1[K])+re.Tlo_Ar*(re.aLo2_Ar+0.5*re.Tlo_Ar*(re.aLo3_Ar+2*re.Tlo_Ar*(re.aLo4_Ar+0.75*re.Tlo_Ar*re.aLo5_Ar)/3)))+(re.T>re.Tlo_Ar)*(re.T<=re.Tmid_Ar)*(re.aLo7_Ar+re.aLo1_Ar*log(re.T/1[K])+re.T*(re.aLo2_Ar+0.5*re.T*(re.aLo3_Ar+2*re.T*(re.aLo4_Ar+0.75*re.T*re.aLo5_Ar)/3)))+(re.T>re.Tmid_Ar)*(re.T<=re.Thi_Ar)*(re.aHi7_Ar+re.aHi1_Ar*log(re.T/1[K])+re.T*(re.aHi2_Ar+0.5*re.T*(re.aHi3_Ar+2*re.T*(re.aHi4_Ar+0.75*re.T*re.aHi5_Ar)/3)))+(re.T>re.Thi_Ar)*(re.aHi7_Ar+re.aHi1_Ar*log(re.T/1[K])+re.Thi_Ar*(re.aHi2_Ar+0.5*re.Thi_Ar*(re.aHi3_Ar+2*re.Thi_Ar*(re.aHi4_Ar+0.75*re.Thi_Ar*re.aHi5_Ar)/3))))
      Cp = R_const*((re.T<=re.Tlo_Ar)*(re.aLo1_Ar+re.Tlo_Ar*(re.aLo2_Ar+re.Tlo_Ar*(re.aLo3_Ar+re.Tlo_Ar*(re.aLo4_Ar+re.Tlo_Ar*re.aLo5_Ar))))+(re.T>re.Tlo_Ar)*(re.T<=re.Tmid_Ar)*(re.aLo1_Ar+re.T*(re.aLo2_Ar+re.T*(re.aLo3_Ar+re.T*(re.aLo4_Ar+re.T*re.aLo5_Ar))))+(re.T>re.Tmid_Ar)*(re.T<=re.Thi_Ar)*(re.aHi1_Ar+re.T*(re.aHi2_Ar+re.T*(re.aHi3_Ar+re.T*(re.aHi4_Ar+re.T*re.aHi5_Ar))))+(re.T>re.Thi_Ar)*(re.aHi1_Ar+re.Thi_Ar*(re.aHi2_Ar+re.Thi_Ar*(re.aHi3_Ar+re.Thi_Ar*(re.aHi4_Ar+re.Thi_Ar*re.aHi5_Ar)))))
      sigma = 3.458[angstrom]
      epsilonkb = 107.4[K]
      mu = 0[C*m]
      ActivityCoefficient = 1
      speciesEnthalpy = NASA
      ReactionTagInSpecies = rch19
      updatefeat = 1
      GasThermalConductivitySel = Automatic
      GasDiffusivitySel = Automatic
      LiquidDiffusivitySel = Automatic
      k = 0.02[W/(m*K)]
      De = 1e-5[m^2/s]
      SpeciesrateSelection = Automatic
      specName = Ar
      Speciesrate = 0[mol/(m^3*s)]
      SpeciesrateSurf = 0[mol/(m^2*s)]
      Speciessurfacerate = 0[mol/(m^2*s)]
      typeGUIControl = volumetric
      mixtureSolvent = 1
      Dgas = 10^-5[m^2/s]
      Dliquid = 10^-8[m^2/s]
      kgas = 0.015[W/(m*K)]
      MolarMassSelection = Thermodynamics
      M = 39.8775[g/mol]
      liquidDensitySel = Thermodynamics
      rho = 1000[kg/m^3]
      LiquidThermalConductivitySel = Thermodynamics
    HO2: SpeciesChem "Species: HO2"
      sisDef = 1
      sType = volumetric
      sSequenceNo = 15
      SpeciesSource = Reaction
      specLabel = HO2
      Tlo = 300[K]
      Tmid = 1000[K]
      Thi = 5000[K]
      h = R_const*((re.T<=re.Tlo_HO2)*(re.aLo6_HO2+re.Tlo_HO2*(re.aLo1_HO2+0.5*re.Tlo_HO2*(re.aLo2_HO2+2*re.Tlo_HO2*(re.aLo3_HO2+0.75*re.Tlo_HO2*(re.aLo4_HO2+0.8*re.Tlo_HO2*re.aLo5_HO2))/3)))+(re.T>re.Tlo_HO2)*(re.T<=re.Tmid_HO2)*(re.aLo6_HO2+re.T*(re.aLo1_HO2+0.5*re.T*(re.aLo2_HO2+2*re.T*(re.aLo3_HO2+0.75*re.T*(re.aLo4_HO2+0.8*re.T*re.aLo5_HO2))/3)))+(re.T>re.Tmid_HO2)*(re.T<=re.Thi_HO2)*(re.aHi6_HO2+re.T*(re.aHi1_HO2+0.5*re.T*(re.aHi2_HO2+2*re.T*(re.aHi3_HO2+0.75*re.T*(re.aHi4_HO2+0.8*re.T*re.aHi5_HO2))/3)))+(re.T>re.Thi_HO2)*(re.aHi6_HO2+re.Thi_HO2*(re.aHi1_HO2+0.5*re.Thi_HO2*(re.aHi2_HO2+2*re.Thi_HO2*(re.aHi3_HO2+0.75*re.Thi_HO2*(re.aHi4_HO2+0.8*re.Thi_HO2*re.aHi5_HO2))/3))))
      s = R_const*((re.T<=re.Tlo_HO2)*(re.aLo7_HO2+re.aLo1_HO2*log(re.T/1[K])+re.Tlo_HO2*(re.aLo2_HO2+0.5*re.Tlo_HO2*(re.aLo3_HO2+2*re.Tlo_HO2*(re.aLo4_HO2+0.75*re.Tlo_HO2*re.aLo5_HO2)/3)))+(re.T>re.Tlo_HO2)*(re.T<=re.Tmid_HO2)*(re.aLo7_HO2+re.aLo1_HO2*log(re.T/1[K])+re.T*(re.aLo2_HO2+0.5*re.T*(re.aLo3_HO2+2*re.T*(re.aLo4_HO2+0.75*re.T*re.aLo5_HO2)/3)))+(re.T>re.Tmid_HO2)*(re.T<=re.Thi_HO2)*(re.aHi7_HO2+re.aHi1_HO2*log(re.T/1[K])+re.T*(re.aHi2_HO2+0.5*re.T*(re.aHi3_HO2+2*re.T*(re.aHi4_HO2+0.75*re.T*re.aHi5_HO2)/3)))+(re.T>re.Thi_HO2)*(re.aHi7_HO2+re.aHi1_HO2*log(re.T/1[K])+re.Thi_HO2*(re.aHi2_HO2+0.5*re.Thi_HO2*(re.aHi3_HO2+2*re.Thi_HO2*(re.aHi4_HO2+0.75*re.Thi_HO2*re.aHi5_HO2)/3))))
      Cp = R_const*((re.T<=re.Tlo_HO2)*(re.aLo1_HO2+re.Tlo_HO2*(re.aLo2_HO2+re.Tlo_HO2*(re.aLo3_HO2+re.Tlo_HO2*(re.aLo4_HO2+re.Tlo_HO2*re.aLo5_HO2))))+(re.T>re.Tlo_HO2)*(re.T<=re.Tmid_HO2)*(re.aLo1_HO2+re.T*(re.aLo2_HO2+re.T*(re.aLo3_HO2+re.T*(re.aLo4_HO2+re.T*re.aLo5_HO2))))+(re.T>re.Tmid_HO2)*(re.T<=re.Thi_HO2)*(re.aHi1_HO2+re.T*(re.aHi2_HO2+re.T*(re.aHi3_HO2+re.T*(re.aHi4_HO2+re.T*re.aHi5_HO2))))+(re.T>re.Thi_HO2)*(re.aHi1_HO2+re.Thi_HO2*(re.aHi2_HO2+re.Thi_HO2*(re.aHi3_HO2+re.Thi_HO2*(re.aHi4_HO2+re.Thi_HO2*re.aHi5_HO2)))))
      sigma = 3.458[angstrom]
      epsilonkb = 107.4[K]
      mu = 0[C*m]
      ActivityCoefficient = 1
      speciesEnthalpy = NASA
      ReactionTagInSpecies = {rch21, rch22}
      updatefeat = 1
      GasThermalConductivitySel = Automatic
      GasDiffusivitySel = Automatic
      LiquidDiffusivitySel = Automatic
      k = 0.02[W/(m*K)]
      De = 1e-5[m^2/s]
      SpeciesrateSelection = Automatic
      specName = HO2
      R = -re.r_21+re.r_22
      Speciesrate = 0[mol/(m^3*s)]
      SpeciesrateSurf = 0[mol/(m^2*s)]
      Speciessurfacerate = 0[mol/(m^2*s)]
      typeGUIControl = volumetric
      mixtureSolvent = 1
      Dgas = 10^-5[m^2/s]
      Dliquid = 10^-8[m^2/s]
      kgas = 0.015[W/(m*K)]
      MolarMassSelection = Thermodynamics
      M = 33.00678[g/mol]
      liquidDensitySel = Thermodynamics
      rho = 1000[kg/m^3]
      LiquidThermalConductivitySel = Thermodynamics

Studies
  std1 "Study 1"
    time: Transient "Time Dependent" | tlist = range(0,1.0e-5,0.01)

Solver configurations
  sol1 "Solution 1" (study std1)
    v1: Variables "Dependent Variables 1"
    t1: Time "Time-Dependent Solver 1" | tlist = range(0,1.0e-5,0.01); tout = tsteps; rtol = 1.0E-5
      dDef: Direct
      fc1: FullyCoupled | linsolver = dDef; dtech = auto

Datasets
  dset1: Solution | solution = sol1

Plots
  pg1: PlotGroup1D "Concentration (re)" | data = dset1
    glob1: Global
      expr = {re.c_CH4, re.c_M, re.c_CH3, re.c_H, re.c_OH, re.c_H2O, re.c_H2, re.c_O, re.c_CH2O, re.c_O2, re.c_CHO, re.c_CO, re.c_CO2, re.c_Ar, re.c_HO2}
      unit = {mol/m^3, mol/m^3, mol/m^3, mol/m^3, mol/m^3, mol/m^3, mol/m^3, mol/m^3, mol/m^3, mol/m^3, mol/m^3, mol/m^3, mol/m^3, mol/m^3, mol/m^3}
      descr = {Concentration, Concentration, Concentration, Concentration, Concentration, Concentration, Concentration, Concentration, Concentration, Concentration, Concentration, Concentration, Concentration, Concentration, Concentration}