// COMSOL Multiphysics 5.6.0.401 model "PS9_prob3.mph"
// Outline of the model tree

Parameters
  k0 = 4.48e6[1/s]
  Er = 7550[K]
  A = 3600 [cm^2]
  Ta = 312 [K]
  Tf = 298 [K]
  Caf = 3[kmol/m^3]
  U0 = 0.225[J/(cm^2*s*K)]
  dHr = -8.09e8[J/kmol]
  rho = 1e3[kg/m^3]
  cp = 4.19e3[J/(kg*K)]
  VR = 18e-3[m^3]
  Qf = 60e-6[m^3/s]
  M = 330[g/mol]
  c02 = 2[kmol/m^3]
  c03 = 1[kmol/m^3]
  c04 = 0.5[kmol/m^3]
  c05 = 0.1[kmol/m^3]

Variables
  var1 "Variables 1"
    Xa = (Caf-re.c_A)/Caf  // Conversion
    Xa2 = (c02-re2.c_A)/c02  // Conversion
    Xa3 = (c03-re3.c_A)/c03  // Conversion
    Xa4 = (c04-re4.c_A)/c04  // Conversion
    Xa5 = (c05-re5.c_A)/c05  // Conversion

Physics
  re: ReactionEng "Reaction Engineering"
    reactor.reactor = cstrvol
    reactor.Vr = VR
    reactor.reactorparsource = Automatic
    reactor.vp = re.Vr*R_const*re.T*(re.R_A+re.R_B)/max(re.p,eps)
    energybalance.energybalance = include
    energybalance.Qext = U0*A*(re.T-Ta)
    mixture.mixture = gas
    mixture.liquidDensitySel = UserDefined
    mixture.gasDensitySel = UserDefined
    mixture.rhoLiquid = rho
    mixture.rhoGas = rho
    calcTransport.calcTransport = 1
    calcTransport.heatCapacitySel = UserDefined
    calcTransport.gammaSel = Automatic
    calcTransport.eta = 0.001[Pa*s]
    calcTransport.Cptot = cp
    Activity.useActivity = 0
    SimpropMass.Species = {A, B}
    SimpropMass.SpeciesInputType = {Variable, Variable}
    SimpropMass.Notes = {re.R_A, re.R_B}
    inits1: SpeciesInitialValue "Initial Values 1" | initialValue = {Caf, 0}; T0 = Tf
    rch1: ReactionChem "1: A=>B"
      Ef = Er*R_const
      useArrhenius = 1
      formula = A=>B
      H = dHr
      Af = k0
      ReactionEnthalpy = UserDefined
      ReactionEntropy = Automatic
      ReactionHeatSource = Automatic
    A: SpeciesChem "Species: A" | Cp = cp*M; speciesEnthalpy = NASA; M = M; rho = rho
    B: SpeciesChem "Species: B" | Cp = cp*M; speciesEnthalpy = NASA; M = M; rho = rho
    feed1: FeedStream "Feed Inlet 1" | vf = Qf; Tf = Tf; FeedSpeciesConcentration = {Caf, 0}
  re2: ReactionEng "Reaction Engineering 2"
    inits1: SpeciesInitialValue "Initial Values 1" | initialValue = {c02, 0}; T0 = Tf
    rch1: ReactionChem "1: A=>B"
      reset = 1
      resetReactionType = noChange
      updatefeat = 1
      formulaID = irrev_A_B_
      Ef = Er*R_const
      Tref = 1[K]
      KeqNum = re.c_B*1[m^3/mol]
      KeqDen = re.c_A*1[m^3/mol]
      rClass = volumetric
      rIsValid = 1
      rType = irrev
      stoichArray = {-1, 1}
      fwdSpecies = A
      revSpecies = B
      fwdSpeciesTags = A
      revSpeciesTags = B
      Species = {A, B}
      ReactionEquilibrium = Automatic
      ReactionExpression = Automatic
      useArrhenius = 1
      Keq0 = 1
      EquilibriumConstantSettings = UserDefined
      textOverallOrder = Overall forward reaction order: 1
      bulkFwdOrder = 1
      bulkRevOrder = 1
      rSequenceNo = 1
      typeGUIControl = irrev
      formula = A=>B
      H = dHr
      S = -re.s_A+re.s_B
      Q = -re.r_1*re.H_1
      Keq = re.c_B/re.c_A-re.Keq0_1
      kf = 1
      kr = 1
      Af = k0
      Ar = 1
      r = re.kf_1*re.c_A
      ReactionEnthalpy = UserDefined
      ReactionEntropy = Automatic
      ReactionHeatSource = Automatic
    A: SpeciesChem "Species: A"
      sisDef = 1
      sType = volumetric
      sSequenceNo = 1
      SpeciesSource = Reaction
      specLabel = A
      Tlo = 300[K]
      Tmid = 1000[K]
      Thi = 5000[K]
      Cp = cp*M
      sigma = 3.458[angstrom]
      epsilonkb = 107.4[K]
      mu = 0[C*m]
      ActivityCoefficient = 1
      speciesEnthalpy = NASA
      ReactionTagInSpecies = rch1
      updatefeat = 1
      GasThermalConductivitySel = Automatic
      GasDiffusivitySel = Automatic
      LiquidDiffusivitySel = Automatic
      k = 0.02[W/(m*K)]
      De = 1e-5[m^2/s]
      SpeciesrateSelection = Automatic
      specName = A
      R = -re.r_1
      Speciesrate = 0[mol/(m^3*s)]
      SpeciesrateSurf = 0[mol/(m^2*s)]
      Speciessurfacerate = 0[mol/(m^2*s)]
      typeGUIControl = volumetric
      mixtureSolvent = 1
      Dgas = 10^-5[m^2/s]
      Dliquid = 10^-8[m^2/s]
      kgas = 0.015[W/(m*K)]
      MolarMassSelection = Thermodynamics
      M = M
      liquidDensitySel = Thermodynamics
      rho = rho
      LiquidThermalConductivitySel = Thermodynamics
    B: SpeciesChem "Species: B"
      sisDef = 1
      sType = volumetric
      sSequenceNo = 2
      SpeciesSource = Reaction
      specLabel = B
      Tlo = 300[K]
      Tmid = 1000[K]
      Thi = 5000[K]
      Cp = cp*M
      sigma = 3.458[angstrom]
      epsilonkb = 107.4[K]
      mu = 0[C*m]
      ActivityCoefficient = 1
      speciesEnthalpy = NASA
      ReactionTagInSpecies = rch1
      updatefeat = 1
      GasThermalConductivitySel = Automatic
      GasDiffusivitySel = Automatic
      LiquidDiffusivitySel = Automatic
      k = 0.02[W/(m*K)]
      De = 1e-5[m^2/s]
      SpeciesrateSelection = Automatic
      specName = B
      R = re.r_1
      Speciesrate = 0[mol/(m^3*s)]
      SpeciesrateSurf = 0[mol/(m^2*s)]
      Speciessurfacerate = 0[mol/(m^2*s)]
      typeGUIControl = volumetric
      mixtureSolvent = 1
      Dgas = 10^-5[m^2/s]
      Dliquid = 10^-8[m^2/s]
      kgas = 0.015[W/(m*K)]
      MolarMassSelection = Thermodynamics
      M = M
      liquidDensitySel = Thermodynamics
      rho = rho
      LiquidThermalConductivitySel = Thermodynamics
    feed1: FeedStream "Feed Inlet 1" | Tf = Tf; FeedSpeciesConcentration = {c02, 0}
  re3: ReactionEng "Reaction Engineering 3"
    inits1: SpeciesInitialValue "Initial Values 1" | initialValue = {c03, 0}; T0 = Tf
    rch1: ReactionChem "1: A=>B"
      reset = 1
      resetReactionType = noChange
      updatefeat = 1
      formulaID = irrev_A_B_
      Ef = Er*R_const
      Tref = 1[K]
      KeqNum = re.c_B*1[m^3/mol]
      KeqDen = re.c_A*1[m^3/mol]
      rClass = volumetric
      rIsValid = 1
      rType = irrev
      stoichArray = {-1, 1}
      fwdSpecies = A
      revSpecies = B
      fwdSpeciesTags = A
      revSpeciesTags = B
      Species = {A, B}
      ReactionEquilibrium = Automatic
      ReactionExpression = Automatic
      useArrhenius = 1
      Keq0 = 1
      EquilibriumConstantSettings = UserDefined
      textOverallOrder = Overall forward reaction order: 1
      bulkFwdOrder = 1
      bulkRevOrder = 1
      rSequenceNo = 1
      typeGUIControl = irrev
      formula = A=>B
      H = dHr
      S = -re.s_A+re.s_B
      Q = -re.r_1*re.H_1
      Keq = re.c_B/re.c_A-re.Keq0_1
      kf = 1
      kr = 1
      Af = k0
      Ar = 1
      r = re.kf_1*re.c_A
      ReactionEnthalpy = UserDefined
      ReactionEntropy = Automatic
      ReactionHeatSource = Automatic
    A: SpeciesChem "Species: A"
      sisDef = 1
      sType = volumetric
      sSequenceNo = 1
      SpeciesSource = Reaction
      specLabel = A
      Tlo = 300[K]
      Tmid = 1000[K]
      Thi = 5000[K]
      Cp = cp*M
      sigma = 3.458[angstrom]
      epsilonkb = 107.4[K]
      mu = 0[C*m]
      ActivityCoefficient = 1
      speciesEnthalpy = NASA
      ReactionTagInSpecies = rch1
      updatefeat = 1
      GasThermalConductivitySel = Automatic
      GasDiffusivitySel = Automatic
      LiquidDiffusivitySel = Automatic
      k = 0.02[W/(m*K)]
      De = 1e-5[m^2/s]
      SpeciesrateSelection = Automatic
      specName = A
      R = -re.r_1
      Speciesrate = 0[mol/(m^3*s)]
      SpeciesrateSurf = 0[mol/(m^2*s)]
      Speciessurfacerate = 0[mol/(m^2*s)]
      typeGUIControl = volumetric
      mixtureSolvent = 1
      Dgas = 10^-5[m^2/s]
      Dliquid = 10^-8[m^2/s]
      kgas = 0.015[W/(m*K)]
      MolarMassSelection = Thermodynamics
      M = M
      liquidDensitySel = Thermodynamics
      rho = rho
      LiquidThermalConductivitySel = Thermodynamics
    B: SpeciesChem "Species: B"
      sisDef = 1
      sType = volumetric
      sSequenceNo = 2
      SpeciesSource = Reaction
      specLabel = B
      Tlo = 300[K]
      Tmid = 1000[K]
      Thi = 5000[K]
      Cp = cp*M
      sigma = 3.458[angstrom]
      epsilonkb = 107.4[K]
      mu = 0[C*m]
      ActivityCoefficient = 1
      speciesEnthalpy = NASA
      ReactionTagInSpecies = rch1
      updatefeat = 1
      GasThermalConductivitySel = Automatic
      GasDiffusivitySel = Automatic
      LiquidDiffusivitySel = Automatic
      k = 0.02[W/(m*K)]
      De = 1e-5[m^2/s]
      SpeciesrateSelection = Automatic
      specName = B
      R = re.r_1
      Speciesrate = 0[mol/(m^3*s)]
      SpeciesrateSurf = 0[mol/(m^2*s)]
      Speciessurfacerate = 0[mol/(m^2*s)]
      typeGUIControl = volumetric
      mixtureSolvent = 1
      Dgas = 10^-5[m^2/s]
      Dliquid = 10^-8[m^2/s]
      kgas = 0.015[W/(m*K)]
      MolarMassSelection = Thermodynamics
      M = M
      liquidDensitySel = Thermodynamics
      rho = rho
      LiquidThermalConductivitySel = Thermodynamics
    feed1: FeedStream "Feed Inlet 1" | Tf = Tf; FeedSpeciesConcentration = {c03, 0}
  re4: ReactionEng "Reaction Engineering 4"
    inits1: SpeciesInitialValue "Initial Values 1" | initialValue = {c04, 0}; T0 = Tf
    rch1: ReactionChem "1: A=>B"
      reset = 1
      resetReactionType = noChange
      updatefeat = 1
      formulaID = irrev_A_B_
      Ef = Er*R_const
      Tref = 1[K]
      KeqNum = re.c_B*1[m^3/mol]
      KeqDen = re.c_A*1[m^3/mol]
      rClass = volumetric
      rIsValid = 1
      rType = irrev
      stoichArray = {-1, 1}
      fwdSpecies = A
      revSpecies = B
      fwdSpeciesTags = A
      revSpeciesTags = B
      Species = {A, B}
      ReactionEquilibrium = Automatic
      ReactionExpression = Automatic
      useArrhenius = 1
      Keq0 = 1
      EquilibriumConstantSettings = UserDefined
      textOverallOrder = Overall forward reaction order: 1
      bulkFwdOrder = 1
      bulkRevOrder = 1
      rSequenceNo = 1
      typeGUIControl = irrev
      formula = A=>B
      H = dHr
      S = -re.s_A+re.s_B
      Q = -re.r_1*re.H_1
      Keq = re.c_B/re.c_A-re.Keq0_1
      kf = 1
      kr = 1
      Af = k0
      Ar = 1
      r = re.kf_1*re.c_A
      ReactionEnthalpy = UserDefined
      ReactionEntropy = Automatic
      ReactionHeatSource = Automatic
    A: SpeciesChem "Species: A"
      sisDef = 1
      sType = volumetric
      sSequenceNo = 1
      SpeciesSource = Reaction
      specLabel = A
      Tlo = 300[K]
      Tmid = 1000[K]
      Thi = 5000[K]
      Cp = cp*M
      sigma = 3.458[angstrom]
      epsilonkb = 107.4[K]
      mu = 0[C*m]
      ActivityCoefficient = 1
      speciesEnthalpy = NASA
      ReactionTagInSpecies = rch1
      updatefeat = 1
      GasThermalConductivitySel = Automatic
      GasDiffusivitySel = Automatic
      LiquidDiffusivitySel = Automatic
      k = 0.02[W/(m*K)]
      De = 1e-5[m^2/s]
      SpeciesrateSelection = Automatic
      specName = A
      R = -re.r_1
      Speciesrate = 0[mol/(m^3*s)]
      SpeciesrateSurf = 0[mol/(m^2*s)]
      Speciessurfacerate = 0[mol/(m^2*s)]
      typeGUIControl = volumetric
      mixtureSolvent = 1
      Dgas = 10^-5[m^2/s]
      Dliquid = 10^-8[m^2/s]
      kgas = 0.015[W/(m*K)]
      MolarMassSelection = Thermodynamics
      M = M
      liquidDensitySel = Thermodynamics
      rho = rho
      LiquidThermalConductivitySel = Thermodynamics
    B: SpeciesChem "Species: B"
      sisDef = 1
      sType = volumetric
      sSequenceNo = 2
      SpeciesSource = Reaction
      specLabel = B
      Tlo = 300[K]
      Tmid = 1000[K]
      Thi = 5000[K]
      Cp = cp*M
      sigma = 3.458[angstrom]
      epsilonkb = 107.4[K]
      mu = 0[C*m]
      ActivityCoefficient = 1
      speciesEnthalpy = NASA
      ReactionTagInSpecies = rch1
      updatefeat = 1
      GasThermalConductivitySel = Automatic
      GasDiffusivitySel = Automatic
      LiquidDiffusivitySel = Automatic
      k = 0.02[W/(m*K)]
      De = 1e-5[m^2/s]
      SpeciesrateSelection = Automatic
      specName = B
      R = re.r_1
      Speciesrate = 0[mol/(m^3*s)]
      SpeciesrateSurf = 0[mol/(m^2*s)]
      Speciessurfacerate = 0[mol/(m^2*s)]
      typeGUIControl = volumetric
      mixtureSolvent = 1
      Dgas = 10^-5[m^2/s]
      Dliquid = 10^-8[m^2/s]
      kgas = 0.015[W/(m*K)]
      MolarMassSelection = Thermodynamics
      M = M
      liquidDensitySel = Thermodynamics
      rho = rho
      LiquidThermalConductivitySel = Thermodynamics
    feed1: FeedStream "Feed Inlet 1" | Tf = Tf; FeedSpeciesConcentration = {c04, 0}
  re5: ReactionEng "Reaction Engineering 5"
    inits1: SpeciesInitialValue "Initial Values 1" | initialValue = {c05, 0}; T0 = Tf
    rch1: ReactionChem "1: A=>B"
      reset = 1
      resetReactionType = noChange
      updatefeat = 1
      formulaID = irrev_A_B_
      Ef = Er*R_const
      Tref = 1[K]
      KeqNum = re.c_B*1[m^3/mol]
      KeqDen = re.c_A*1[m^3/mol]
      rClass = volumetric
      rIsValid = 1
      rType = irrev
      stoichArray = {-1, 1}
      fwdSpecies = A
      revSpecies = B
      fwdSpeciesTags = A
      revSpeciesTags = B
      Species = {A, B}
      ReactionEquilibrium = Automatic
      ReactionExpression = Automatic
      useArrhenius = 1
      Keq0 = 1
      EquilibriumConstantSettings = UserDefined
      textOverallOrder = Overall forward reaction order: 1
      bulkFwdOrder = 1
      bulkRevOrder = 1
      rSequenceNo = 1
      typeGUIControl = irrev
      formula = A=>B
      H = dHr
      S = -re.s_A+re.s_B
      Q = -re.r_1*re.H_1
      Keq = re.c_B/re.c_A-re.Keq0_1
      kf = 1
      kr = 1
      Af = k0
      Ar = 1
      r = re.kf_1*re.c_A
      ReactionEnthalpy = UserDefined
      ReactionEntropy = Automatic
      ReactionHeatSource = Automatic
    A: SpeciesChem "Species: A"
      sisDef = 1
      sType = volumetric
      sSequenceNo = 1
      SpeciesSource = Reaction
      specLabel = A
      Tlo = 300[K]
      Tmid = 1000[K]
      Thi = 5000[K]
      Cp = cp*M
      sigma = 3.458[angstrom]
      epsilonkb = 107.4[K]
      mu = 0[C*m]
      ActivityCoefficient = 1
      speciesEnthalpy = NASA
      ReactionTagInSpecies = rch1
      updatefeat = 1
      GasThermalConductivitySel = Automatic
      GasDiffusivitySel = Automatic
      LiquidDiffusivitySel = Automatic
      k = 0.02[W/(m*K)]
      De = 1e-5[m^2/s]
      SpeciesrateSelection = Automatic
      specName = A
      R = -re.r_1
      Speciesrate = 0[mol/(m^3*s)]
      SpeciesrateSurf = 0[mol/(m^2*s)]
      Speciessurfacerate = 0[mol/(m^2*s)]
      typeGUIControl = volumetric
      mixtureSolvent = 1
      Dgas = 10^-5[m^2/s]
      Dliquid = 10^-8[m^2/s]
      kgas = 0.015[W/(m*K)]
      MolarMassSelection = Thermodynamics
      M = M
      liquidDensitySel = Thermodynamics
      rho = rho
      LiquidThermalConductivitySel = Thermodynamics
    B: SpeciesChem "Species: B"
      sisDef = 1
      sType = volumetric
      sSequenceNo = 2
      SpeciesSource = Reaction
      specLabel = B
      Tlo = 300[K]
      Tmid = 1000[K]
      Thi = 5000[K]
      Cp = cp*M
      sigma = 3.458[angstrom]
      epsilonkb = 107.4[K]
      mu = 0[C*m]
      ActivityCoefficient = 1
      speciesEnthalpy = NASA
      ReactionTagInSpecies = rch1
      updatefeat = 1
      GasThermalConductivitySel = Automatic
      GasDiffusivitySel = Automatic
      LiquidDiffusivitySel = Automatic
      k = 0.02[W/(m*K)]
      De = 1e-5[m^2/s]
      SpeciesrateSelection = Automatic
      specName = B
      R = re.r_1
      Speciesrate = 0[mol/(m^3*s)]
      SpeciesrateSurf = 0[mol/(m^2*s)]
      Speciessurfacerate = 0[mol/(m^2*s)]
      typeGUIControl = volumetric
      mixtureSolvent = 1
      Dgas = 10^-5[m^2/s]
      Dliquid = 10^-8[m^2/s]
      kgas = 0.015[W/(m*K)]
      MolarMassSelection = Thermodynamics
      M = M
      liquidDensitySel = Thermodynamics
      rho = rho
      LiquidThermalConductivitySel = Thermodynamics
    feed1: FeedStream "Feed Inlet 1" | Tf = Tf; FeedSpeciesConcentration = {c05, 0}

Studies
  std1 "Study 1"
    time: Transient "Time Dependent" | tunit = h; tlist = range(0,0.1,1)

Solver configurations
  sol1 "Solution 1" (study std1)
    v1: Variables "Dependent Variables 1"
    t1: Time "Time-Dependent Solver 1" | tlist = range(0,0.1,1); tout = tsteps; rtol = 1.0E-5
      dDef: Direct
      fc1: FullyCoupled | linsolver = dDef; dtech = auto

Datasets
  dset1: Solution | solution = sol1

Plots
  pg1: PlotGroup1D "Concentration (re)" | data = dset1
    glob1: Global
      expr = {re.c_A, re2.c_A, re3.c_A, re4.c_A, re5.c_A}
      unit = {mol/m^3, mol/m^3, mol/m^3, mol/m^3, mol/m^3}
      descr = {Concentration, Concentration, Concentration, Concentration, Concentration}
  pg2: PlotGroup1D "Temperature (re)" | data = dset1
    glob1: Global
      expr = {re.T, re2.T, re3.T, re4.T, re5.T}
      unit = {K, K, K, K, K}
      descr = {Temperature, Temperature, Temperature, Temperature, Temperature}
  pg4: PlotGroup1D "Conversion" | data = dset1
    glob1: Global
      expr = {Xa, Xa2, Xa3, Xa4, Xa5}
      unit = {1, 1, 1, 1, 1}
      descr = {Conversion, Conversion, Conversion, Conversion, Conversion}
  pg3: PlotGroup1D "Temp x Conc" | data = dset1
    glob1: Global
      expr = {re.c_A, re.c_B}
      unit = {mol/m^3, mol/m^3}
      descr = {Concentration, Concentration}
      xdata = expr
      xdataexpr = re.T
  pg5: PlotGroup1D "Temp x Conc 1" | data = dset1
    glob2: Global
      expr = {re2.c_A, re2.c_B}
      unit = {mol/m^3, mol/m^3}
      descr = {Concentration, Concentration}
      xdata = expr
      xdataexpr = re2.T
  pg6: PlotGroup1D "Temp x Conc 1.1" | data = dset1
    glob2: Global
      expr = {re3.c_A, re3.c_B}
      unit = {mol/m^3, mol/m^3}
      descr = {Concentration, Concentration}
      xdata = expr
      xdataexpr = re3.T
  pg7: PlotGroup1D "Temp x Conc 1.1.1" | data = dset1
    glob2: Global
      expr = {re4.c_A, re4.c_B}
      unit = {mol/m^3, mol/m^3}
      descr = {Concentration, Concentration}
      xdata = expr
      xdataexpr = re4.T
  pg8: PlotGroup1D "Temp x Conc 1.1.1.1" | data = dset1
    glob2: Global
      expr = {re5.c_A, re5.c_B}
      unit = {mol/m^3, mol/m^3}
      descr = {Concentration, Concentration}
      xdata = expr
      xdataexpr = re5.T